// SBML level 3 version 1

model inhibitor_irrev()

  // Compartments:
  compartment default_compartment = 1;

  // Species:
  species E in default_compartment = 1;
  species S in default_compartment = 10;
  species P in default_compartment;
  species I in default_compartment = 100;

  // Parameters:
  Vf = kcatf*kbf*Ks;
  Keq = Vf/Vr*(Kp/Ks);
  Ks = 10;
  Kp = kcatr/kcatf;
  KI = 5;
  rho = 1;
  kcatf = 2*rho;
  kcatr = 1*rho;
  kbr = rho;
  kbf = kbr*Ks;
  kpr = rho;
  kpf = kpr*Kp;
  Vr = kcatr*kbr*Kp;
  kir = rho;
  kif = kir*KI;

  // Reactions:
  v: E + S => E + P; Vf*E*((S - P/Keq)/Ks)/(1 + S/Ks + P/Kp + I/KI);  // modifiers: I
end
