// SBML level 3 version 1

model main()

  // Compartments:
  compartment comp1 = 1;

  // Species:
  species E in comp1;
  species S in comp1;
  species I in comp1;
  species EI in comp1;
  species ES in comp1;
  species P in comp1;

  // Parameters:
  block0_A_FB_EN_sw = 1;
  block0_FF_EN_sw1 = 0;
  block0_FF_EN_sw2 = 1;
  block0_FF_EN_sw3 = 1;
  block0_FF_EN_sw4 = 0;
  block0_B_FB_EN_sw = 1;
  block0_Ctot_sw = 0;
  block0_Ctot_sw_not = 1;
  block0_n = 1;
  block0_KDfw = 0.1;
  block0_KDrv = 1;
  block0_kr = 1;
  block0_ratC = 0;
  block0_kdeg = 1;
  block0_Ctot_computed = 0;
  block1_A_FB_EN_sw = 0;
  block1_FF_EN_sw1 = 0;
  block1_FF_EN_sw2 = 1;
  block1_FF_EN_sw3 = 1;
  block1_FF_EN_sw4 = 0;
  block1_B_FB_EN_sw = 1;
  block1_Ctot_sw = 0;
  block1_Ctot_sw_not = 1;
  block1_n = 1;
  block1_KDfw = 0.2;
  block1_KDrv = 1;
  block1_kr = 1;
  block1_ratC = 0;
  block1_kdeg = 1;
  block1_Ctot_computed = 0;
  block2_A_FB_EN_sw = 1;
  block2_FF_EN_sw1 = 0;
  block2_FF_EN_sw2 = 1;
  block2_FF_EN_sw3 = 1;
  block2_FF_EN_sw4 = 0;
  block2_B_FB_EN_sw = 0;
  block2_Ctot_sw = 0;
  block2_Ctot_sw_not = 1;
  block2_n = 1;
  block2_KDfw = 0.05;
  block2_KDrv = 0.1;
  block2_kr = 1;
  block2_ratC = 0;
  block2_kdeg = 1;
  block2_Ctot_computed = 0;
  block3_A_FB_EN_sw = 0;
  block3_FF_EN_sw1 = 0;
  block3_FF_EN_sw2 = 1;
  block3_FF_EN_sw3 = 1;
  block3_FF_EN_sw4 = 0;
  block3_B_FB_EN_sw = 0;
  block3_Ctot_sw = 0;
  block3_Ctot_sw_not = 1;
  block3_n = 1;
  block3_KDfw = 0.05;
  block3_KDrv = 0.1;
  block3_kr = 1;
  block3_ratC = 0;
  block3_kdeg = 1;
  block3_Ctot_computed = 0;

  // Assignment rules:
  block0_Atot := 1 + block2_Ctot + (-block1_Ctot);
  block0_Btot := 10;
  block0_Ctot_in := 0;
  block0_Cprod := 0;
  block0_Cdeg := 0;
  block0_Cfree := 0 + block2_Afree;
  block0_Dfree := 1;
  block0_Afree := block0_Atot - block0_A_FB_EN_sw*block0_Ctot;
  block0_Bfree := block0_Btot - block0_B_FB_EN_sw*block0_Ctot;
  block0_rate_fw := block0_Afree*(block0_Bfree/block0_KDfw)^block0_n;
  block0_fw_up := block0_Cprod - block0_FF_EN_sw1*block0_rate_fw;
  block0_fw_tot := block0_Cprod + block0_FF_EN_sw2*block0_rate_fw;
  block0_Cfree_out := block0_Cfree;
  block0_Dfree_out := block0_Dfree;
  block0_rate_rv := block0_Cfree*(block0_Dfree/block0_KDrv);
  block0_Add6 := block0_Cdeg + block0_Cfree*block0_ratC;
  block0_rv_tot := block0_FF_EN_sw3*block0_rate_rv + block0_Add6;
  block0_rv_up := block0_Add6 - block0_FF_EN_sw4*block0_rate_rv;
  block0_Add3 := block0_fw_tot - block0_FF_EN_sw3*block0_rate_rv;
  block0_Add10 := block0_Add3*block0_kr - block0_Add6*block0_kdeg;
  block0_Ctot := block0_Ctot_sw*block0_Ctot_in + block0_Ctot_computed;
  E := block0_Afree;
  S := block0_Bfree;
  block1_Atot := 0 + block0_Afree;
  block1_Btot := 50;
  block1_Ctot_in := 0;
  block1_Cprod := 0;
  block1_Cdeg := 0;
  block1_Cfree := 0 + block1_Ctot;
  block1_Dfree := 1;
  block1_Afree := block1_Atot - block1_A_FB_EN_sw*block1_Ctot;
  block1_Bfree := block1_Btot - block1_B_FB_EN_sw*block1_Ctot;
  block1_rate_fw := block1_Afree*(block1_Bfree/block1_KDfw)^block1_n;
  block1_fw_up := block1_Cprod - block1_FF_EN_sw1*block1_rate_fw;
  block1_fw_tot := block1_Cprod + block1_FF_EN_sw2*block1_rate_fw;
  block1_Cfree_out := block1_Cfree;
  block1_Dfree_out := block1_Dfree;
  block1_rate_rv := block1_Cfree*(block1_Dfree/block1_KDrv);
  block1_Add6 := block1_Cdeg + block1_Cfree*block1_ratC;
  block1_rv_tot := block1_FF_EN_sw3*block1_rate_rv + block1_Add6;
  block1_rv_up := block1_Add6 - block1_FF_EN_sw4*block1_rate_rv;
  block1_Add3 := block1_fw_tot - block1_FF_EN_sw3*block1_rate_rv;
  block1_Add10 := block1_Add3*block1_kr - block1_Add6*block1_kdeg;
  block1_Ctot := block1_Ctot_sw*block1_Ctot_in + block1_Ctot_computed;
  I := block1_Bfree;
  EI := block1_Ctot;
  block2_Atot := 0 + block0_Ctot;
  block2_Btot := 1;
  block2_Ctot_in := 0;
  block2_Cprod := 0;
  block2_Cdeg := 0;
  block2_Cfree := 0 + block0_Afree;
  block2_Dfree := 0 + block3_Ctot;
  block2_Afree := block2_Atot - block2_A_FB_EN_sw*block2_Ctot;
  block2_Bfree := block2_Btot - block2_B_FB_EN_sw*block2_Ctot;
  block2_rate_fw := block2_Afree*(block2_Bfree/block2_KDfw)^block2_n;
  block2_fw_up := block2_Cprod - block2_FF_EN_sw1*block2_rate_fw;
  block2_fw_tot := block2_Cprod + block2_FF_EN_sw2*block2_rate_fw;
  block2_Cfree_out := block2_Cfree;
  block2_Dfree_out := block2_Dfree;
  block2_rate_rv := block2_Cfree*(block2_Dfree/block2_KDrv);
  block2_Add6 := block2_Cdeg + block2_Cfree*block2_ratC;
  block2_rv_tot := block2_FF_EN_sw3*block2_rate_rv + block2_Add6;
  block2_rv_up := block2_Add6 - block2_FF_EN_sw4*block2_rate_rv;
  block2_Add3 := block2_fw_tot - block2_FF_EN_sw3*block2_rate_rv;
  block2_Add10 := block2_Add3*block2_kr - block2_Add6*block2_kdeg;
  block2_Ctot := block2_Ctot_sw*block2_Ctot_in + block2_Ctot_computed;
  ES := block2_Afree;
  block3_Atot := 0;
  block3_Btot := 1;
  block3_Ctot_in := 0;
  block3_Cprod := 0 + block2_rate_fw;
  block3_Cdeg := 0 + block2_rate_rv;
  block3_Cfree := 0 + block3_Ctot;
  block3_Dfree := 0;
  block3_Afree := block3_Atot - block3_A_FB_EN_sw*block3_Ctot;
  block3_Bfree := block3_Btot - block3_B_FB_EN_sw*block3_Ctot;
  block3_rate_fw := block3_Afree*(block3_Bfree/block3_KDfw)^block3_n;
  block3_fw_up := block3_Cprod - block3_FF_EN_sw1*block3_rate_fw;
  block3_fw_tot := block3_Cprod + block3_FF_EN_sw2*block3_rate_fw;
  block3_Cfree_out := block3_Cfree;
  block3_Dfree_out := block3_Dfree;
  block3_rate_rv := block3_Cfree*(block3_Dfree/block3_KDrv);
  block3_Add6 := block3_Cdeg + block3_Cfree*block3_ratC;
  block3_rv_tot := block3_FF_EN_sw3*block3_rate_rv + block3_Add6;
  block3_rv_up := block3_Add6 - block3_FF_EN_sw4*block3_rate_rv;
  block3_Add3 := block3_fw_tot - block3_FF_EN_sw3*block3_rate_rv;
  block3_Add10 := block3_Add3*block3_kr - block3_Add6*block3_kdeg;
  block3_Ctot := block3_Ctot_sw*block3_Ctot_in + block3_Ctot_computed;
  P := block3_Ctot;

  // Rate rules:
  block0_Ctot_computed' = block0_Ctot_sw_not*block0_Add10;
  block1_Ctot_computed' = block1_Ctot_sw_not*block1_Add10;
  block2_Ctot_computed' = block2_Ctot_sw_not*block2_Add10;
  block3_Ctot_computed' = block3_Ctot_sw_not*block3_Add10;
end
