// SBML level 3 version 1

model kinase_cascade()

  // Compartments:
  compartment default = 1;

  // Species:
  substanceOnly species __s0 in default = 60000; __s0 is "Ras(k=None)";
  substanceOnly species __s1 in default = 70000; __s1 is "Raf(s='u', k=None)";
  substanceOnly species __s2 in default = 3000000; __s2 is "MEK(s218='u', s222='u', k=None)";
  substanceOnly species __s3 in default = 700000; __s3 is "ERK(t185='u', y187='u')";
  substanceOnly species __s4 in default = 200000; __s4 is "PP2A(ppt=None)";
  substanceOnly species __s5 in default = 17000; __s5 is "MKP(ppt=None)";
  substanceOnly species __s6 in default = 0; __s6 is "Raf(s=('u', 1), k=None) ._br_Ras(k=1)";
  substanceOnly species __s7 in default = 0; __s7 is "Raf(s='p', k=None)";
  substanceOnly species __s8 in default = 0; __s8 is "PP2A(ppt=1) ._br_Raf(s=('p', 1), k=None)";
  substanceOnly species __s9 in default = 0; __s9 is "MEK(s218=('u', 1), s222='u', k=None) ._br_Raf(s='p', k=1)";
  substanceOnly species __s10 in default = 0; __s10 is "MEK(s218='p', s222='u', k=None)";
  substanceOnly species __s11 in default = 0; __s11 is "MEK(s218=('p', 1), s222='u', k=None) ._br_PP2A(ppt=1)";
  substanceOnly species __s12 in default = 0; __s12 is "MEK(s218='p', s222=('u', 1), k=None) ._br_Raf(s='p', k=1)";
  substanceOnly species __s13 in default = 0; __s13 is "MEK(s218='p', s222='p', k=None)";
  substanceOnly species __s14 in default = 0; __s14 is "MEK(s218='p', s222=('p', 1), k=None) ._br_PP2A(ppt=1)";
  substanceOnly species __s15 in default = 0; __s15 is "ERK(t185=('u', 1), y187='u') ._br_MEK(s218='p', s222='p', k=1)";
  substanceOnly species __s16 in default = 0; __s16 is "ERK(t185='p', y187='u')";
  substanceOnly species __s17 in default = 0; __s17 is "ERK(t185=('p', 1), y187='u') ._br_MKP(ppt=1)";
  substanceOnly species __s18 in default = 0; __s18 is "ERK(t185='p', y187=('u', 1)) ._br_MEK(s218='p', s222='p', k=1)";
  substanceOnly species __s19 in default = 0; __s19 is "ERK(t185='p', y187='p')";
  substanceOnly species __s20 in default = 0; __s20 is "ERK(t185='p', y187=('p', 1)) ._br_MKP(ppt=1)";

  // Parameters:
  var __obs0; __obs0 is "ppMEK";
  var __obs1; __obs1 is "ppERK";
  bind_Ras_Rafu_to_RasRaf_kf = 1e-5;
  bind_Ras_Rafu_to_RasRaf_kr = 0.1;
  catalyze_RasRaf_to_Ras_Rafp_kc = 0.1;
  bind_PP2A_Rafp_to_PP2ARaf_kf = 1e-5;
  bind_PP2A_Rafp_to_PP2ARaf_kr = 0.1;
  bind_Rafp_MEKuu_to_RafpMEKu_kf = 1e-5;
  bind_Rafp_MEKuu_to_RafpMEKu_kr = 0.1;
  catalyze_PP2ARaf_to_PP2A_Rafu_kc = 0.003;
  catalyze_RafpMEKu_to_Rafp_MEKup_kc = 0.1;
  bind_PP2A_MEKup_to_PP2AMEKu_kf = 1e-5;
  bind_PP2A_MEKup_to_PP2AMEKu_kr = 0.1;
  bind_Rafp_MEKpu_to_RafpMEKp_kf = 1e-5;
  bind_Rafp_MEKpu_to_RafpMEKp_kr = 0.1;
  catalyze_PP2AMEKu_to_PP2A_MEKuu_kc = 0.003;
  catalyze_RafpMEKp_to_Rafp_MEKpp_kc = 0.1;
  bind_PP2A_MEKpp_to_PP2AMEKp_kf = 1e-5;
  bind_PP2A_MEKpp_to_PP2AMEKp_kr = 0.1;
  bind_MEKpp_ERKuu_to_MEKppERKu_kf = 1e-5;
  bind_MEKpp_ERKuu_to_MEKppERKu_kr = 0.1;
  catalyze_PP2AMEKp_to_PP2A_MEKpu_kc = 0.003;
  catalyze_MEKppERKu_to_MEKpp_ERKup_kc = 0.1;
  bind_MKP_ERKup_to_MKPERKu_kf = 1e-5;
  bind_MKP_ERKup_to_MKPERKu_kr = 0.1;
  bind_MEKpp_ERKpu_to_MEKppERKp_kf = 1e-5;
  bind_MEKpp_ERKpu_to_MEKppERKp_kr = 0.1;
  catalyze_MKPERKu_to_MKP_ERKuu_kc = 0.003;
  catalyze_MEKppERKp_to_MEKpp_ERKpp_kc = 0.1;
  bind_MKP_ERKpp_to_MKPERKp_kf = 1e-5;
  bind_MKP_ERKpp_to_MKPERKp_kr = 0.1;
  catalyze_MKPERKp_to_MKP_ERKpu_kc = 0.003;

  // Assignment rules:
  __obs0 := __s13 + __s15 + __s18;
  __obs1 := __s19;

  // Reactions:
  bind_Ras_Rafu_to_RasRaf: __s0 + __s1 -> __s6; __s0*__s1*bind_Ras_Rafu_to_RasRaf_kf - __s6*bind_Ras_Rafu_to_RasRaf_kr;
  catalyze_RasRaf_to_Ras_Rafp: __s6 => __s0 + __s7; __s6*catalyze_RasRaf_to_Ras_Rafp_kc;
  bind_PP2A_Rafp_to_PP2ARaf: __s4 + __s7 -> __s8; __s4*__s7*bind_PP2A_Rafp_to_PP2ARaf_kf - __s8*bind_PP2A_Rafp_to_PP2ARaf_kr;
  bind_Rafp_MEKuu_to_RafpMEKu: __s2 + __s7 -> __s9; __s2*__s7*bind_Rafp_MEKuu_to_RafpMEKu_kf - __s9*bind_Rafp_MEKuu_to_RafpMEKu_kr;
  catalyze_PP2ARaf_to_PP2A_Rafu: __s8 => __s1 + __s4; __s8*catalyze_PP2ARaf_to_PP2A_Rafu_kc;
  catalyze_RafpMEKu_to_Rafp_MEKup: __s9 => __s7 + __s10; __s9*catalyze_RafpMEKu_to_Rafp_MEKup_kc;
  bind_PP2A_MEKup_to_PP2AMEKu: __s4 + __s10 -> __s11; __s10*__s4*bind_PP2A_MEKup_to_PP2AMEKu_kf - __s11*bind_PP2A_MEKup_to_PP2AMEKu_kr;
  bind_Rafp_MEKpu_to_RafpMEKp: __s7 + __s10 -> __s12; __s10*__s7*bind_Rafp_MEKpu_to_RafpMEKp_kf - __s12*bind_Rafp_MEKpu_to_RafpMEKp_kr;
  catalyze_PP2AMEKu_to_PP2A_MEKuu: __s11 => __s2 + __s4; __s11*catalyze_PP2AMEKu_to_PP2A_MEKuu_kc;
  catalyze_RafpMEKp_to_Rafp_MEKpp: __s12 => __s7 + __s13; __s12*catalyze_RafpMEKp_to_Rafp_MEKpp_kc;
  bind_PP2A_MEKpp_to_PP2AMEKp: __s4 + __s13 -> __s14; __s13*__s4*bind_PP2A_MEKpp_to_PP2AMEKp_kf - __s14*bind_PP2A_MEKpp_to_PP2AMEKp_kr;
  bind_MEKpp_ERKuu_to_MEKppERKu: __s3 + __s13 -> __s15; __s13*__s3*bind_MEKpp_ERKuu_to_MEKppERKu_kf - __s15*bind_MEKpp_ERKuu_to_MEKppERKu_kr;
  catalyze_PP2AMEKp_to_PP2A_MEKpu: __s14 => __s4 + __s10; __s14*catalyze_PP2AMEKp_to_PP2A_MEKpu_kc;
  r13: __s15 => __s13 + __s16; __s15*catalyze_MEKppERKu_to_MEKpp_ERKup_kc; r13 is "catalyze_MEKppERKu_to_MEKpp_ERKup";
  bind_MKP_ERKup_to_MKPERKu: __s5 + __s16 -> __s17; __s16*__s5*bind_MKP_ERKup_to_MKPERKu_kf - __s17*bind_MKP_ERKup_to_MKPERKu_kr;
  bind_MEKpp_ERKpu_to_MEKppERKp: __s13 + __s16 -> __s18; __s13*__s16*bind_MEKpp_ERKpu_to_MEKppERKp_kf - __s18*bind_MEKpp_ERKpu_to_MEKppERKp_kr;
  catalyze_MKPERKu_to_MKP_ERKuu: __s17 => __s3 + __s5; __s17*catalyze_MKPERKu_to_MKP_ERKuu_kc;
  r17: __s18 => __s13 + __s19; __s18*catalyze_MEKppERKp_to_MEKpp_ERKpp_kc; r17 is "catalyze_MEKppERKp_to_MEKpp_ERKpp";
  bind_MKP_ERKpp_to_MKPERKp: __s5 + __s19 -> __s20; __s19*__s5*bind_MKP_ERKpp_to_MKPERKp_kf - __s20*bind_MKP_ERKpp_to_MKPERKp_kr;
  catalyze_MKPERKp_to_MKP_ERKpu: __s20 => __s5 + __s16; __s20*catalyze_MKPERKp_to_MKP_ERKpu_kc;
end
