// SBML level 3 version 1

model main()

  // Compartments:
  compartment comp1 = 1;

  // Species:
  species __s0 in comp1;
  species __s1 in comp1;
  species __s6 in comp1;
  species __s4 in comp1;
  species __s7 in comp1;
  species __s2 in comp1;
  species __s8 in comp1;
  species __s9 in comp1;
  species __s10 in comp1;
  species __s11 in comp1;
  species __s12 in comp1;
  species __s13 in comp1;
  species __s3 in comp1;
  species __s14 in comp1;
  species __s15 in comp1;
  species __s5 in comp1;
  species __s16 in comp1;
  species __s17 in comp1;
  species __s18 in comp1;
  species __s19 in comp1;
  species __s20 in comp1;

  // Parameters:
  block0_A_FB_EN_sw = 1;
  block0_FF_EN_sw1 = 0;
  block0_FF_EN_sw2 = 1;
  block0_FF_EN_sw3 = 1;
  block0_FF_EN_sw4 = 0;
  block0_B_FB_EN_sw = 1;
  block0_Ctot_sw = 0;
  block0_Ctot_sw_not = 1;
  block0_n = 1;
  block0_KDfw = 100000;
  block0_KDrv = 10;
  block0_kr = 1;
  block0_ratC = 0;
  block0_kdeg = 1;
  block0_Ctot_computed = 0;
  block1_A_FB_EN_sw = 1;
  block1_FF_EN_sw1 = 0;
  block1_FF_EN_sw2 = 1;
  block1_FF_EN_sw3 = 1;
  block1_FF_EN_sw4 = 0;
  block1_B_FB_EN_sw = 0;
  block1_Ctot_sw = 0;
  block1_Ctot_sw_not = 1;
  block1_n = 1;
  block1_KDfw = 10;
  block1_KDrv = 1;
  block1_kr = 1;
  block1_ratC = 1;
  block1_kdeg = 1;
  block1_Ctot_computed = 0;
  block2_A_FB_EN_sw = 0;
  block2_FF_EN_sw1 = 0;
  block2_FF_EN_sw2 = 1;
  block2_FF_EN_sw3 = 1;
  block2_FF_EN_sw4 = 0;
  block2_B_FB_EN_sw = 0;
  block2_Ctot_sw = 0;
  block2_Ctot_sw_not = 1;
  block2_n = 1;
  block2_KDfw = 10;
  block2_KDrv = 1;
  block2_kr = 1;
  block2_ratC = 0;
  block2_kdeg = 1;
  block2_Ctot_computed = 0;
  block3_A_FB_EN_sw = 1;
  block3_FF_EN_sw1 = 0;
  block3_FF_EN_sw2 = 1;
  block3_FF_EN_sw3 = 1;
  block3_FF_EN_sw4 = 0;
  block3_B_FB_EN_sw = 1;
  block3_Ctot_sw = 0;
  block3_Ctot_sw_not = 1;
  block3_n = 1;
  block3_KDfw = 100000;
  block3_KDrv = 10;
  block3_kr = 1;
  block3_ratC = 0;
  block3_kdeg = 1;
  block3_Ctot_computed = 0;
  block4_A_FB_EN_sw = 1;
  block4_FF_EN_sw1 = 0;
  block4_FF_EN_sw2 = 1;
  block4_FF_EN_sw3 = 1;
  block4_FF_EN_sw4 = 0;
  block4_B_FB_EN_sw = 0;
  block4_Ctot_sw = 0;
  block4_Ctot_sw_not = 1;
  block4_n = 1;
  block4_KDfw = 100000;
  block4_KDrv = 10;
  block4_kr = 1;
  block4_ratC = 0;
  block4_kdeg = 1;
  block4_Ctot_computed = 0;
  block5_A_FB_EN_sw = 1;
  block5_FF_EN_sw1 = 0;
  block5_FF_EN_sw2 = 1;
  block5_FF_EN_sw3 = 1;
  block5_FF_EN_sw4 = 0;
  block5_B_FB_EN_sw = 0;
  block5_Ctot_sw = 0;
  block5_Ctot_sw_not = 1;
  block5_n = 1;
  block5_KDfw = 333.3333;
  block5_KDrv = 1;
  block5_kr = 1;
  block5_ratC = 0;
  block5_kdeg = 1;
  block5_Ctot_computed = 0;
  block6_A_FB_EN_sw = 0;
  block6_FF_EN_sw1 = 0;
  block6_FF_EN_sw2 = 1;
  block6_FF_EN_sw3 = 1;
  block6_FF_EN_sw4 = 0;
  block6_B_FB_EN_sw = 0;
  block6_Ctot_sw = 0;
  block6_Ctot_sw_not = 1;
  block6_n = 1;
  block6_KDfw = 333.3333;
  block6_KDrv = 1;
  block6_kr = 1;
  block6_ratC = 0;
  block6_kdeg = 1;
  block6_Ctot_computed = 0;
  block7_A_FB_EN_sw = 1;
  block7_FF_EN_sw1 = 0;
  block7_FF_EN_sw2 = 1;
  block7_FF_EN_sw3 = 1;
  block7_FF_EN_sw4 = 0;
  block7_B_FB_EN_sw = 0;
  block7_Ctot_sw = 0;
  block7_Ctot_sw_not = 1;
  block7_n = 1;
  block7_KDfw = 10;
  block7_KDrv = 1;
  block7_kr = 1;
  block7_ratC = 0;
  block7_kdeg = 1;
  block7_Ctot_computed = 0;
  block8_A_FB_EN_sw = 0;
  block8_FF_EN_sw1 = 0;
  block8_FF_EN_sw2 = 1;
  block8_FF_EN_sw3 = 1;
  block8_FF_EN_sw4 = 0;
  block8_B_FB_EN_sw = 0;
  block8_Ctot_sw = 0;
  block8_Ctot_sw_not = 1;
  block8_n = 1;
  block8_KDfw = 10;
  block8_KDrv = 1;
  block8_kr = 1;
  block8_ratC = 0;
  block8_kdeg = 1;
  block8_Ctot_computed = 0;
  block9_A_FB_EN_sw = 0;
  block9_FF_EN_sw1 = 0;
  block9_FF_EN_sw2 = 1;
  block9_FF_EN_sw3 = 1;
  block9_FF_EN_sw4 = 0;
  block9_B_FB_EN_sw = 1;
  block9_Ctot_sw = 0;
  block9_Ctot_sw_not = 1;
  block9_n = 1;
  block9_KDfw = 100000;
  block9_KDrv = 10;
  block9_kr = 1;
  block9_ratC = 0;
  block9_kdeg = 1;
  block9_Ctot_computed = 0;
  block10_A_FB_EN_sw = 0;
  block10_FF_EN_sw1 = 0;
  block10_FF_EN_sw2 = 1;
  block10_FF_EN_sw3 = 1;
  block10_FF_EN_sw4 = 0;
  block10_B_FB_EN_sw = 0;
  block10_Ctot_sw = 0;
  block10_Ctot_sw_not = 1;
  block10_n = 1;
  block10_KDfw = 100000;
  block10_KDrv = 10;
  block10_kr = 1;
  block10_ratC = 0;
  block10_kdeg = 1;
  block10_Ctot_computed = 0;
  block11_A_FB_EN_sw = 1;
  block11_FF_EN_sw1 = 0;
  block11_FF_EN_sw2 = 1;
  block11_FF_EN_sw3 = 1;
  block11_FF_EN_sw4 = 0;
  block11_B_FB_EN_sw = 0;
  block11_Ctot_sw = 0;
  block11_Ctot_sw_not = 1;
  block11_n = 1;
  block11_KDfw = 333.3333;
  block11_KDrv = 1;
  block11_kr = 1;
  block11_ratC = 0;
  block11_kdeg = 1;
  block11_Ctot_computed = 0;
  block12_A_FB_EN_sw = 0;
  block12_FF_EN_sw1 = 0;
  block12_FF_EN_sw2 = 1;
  block12_FF_EN_sw3 = 1;
  block12_FF_EN_sw4 = 0;
  block12_B_FB_EN_sw = 0;
  block12_Ctot_sw = 0;
  block12_Ctot_sw_not = 1;
  block12_n = 1;
  block12_KDfw = 333.3333;
  block12_KDrv = 1;
  block12_kr = 1;
  block12_ratC = 0;
  block12_kdeg = 1;
  block12_Ctot_computed = 0;
  block13_A_FB_EN_sw = 1;
  block13_FF_EN_sw1 = 0;
  block13_FF_EN_sw2 = 1;
  block13_FF_EN_sw3 = 1;
  block13_FF_EN_sw4 = 0;
  block13_B_FB_EN_sw = 0;
  block13_Ctot_sw = 0;
  block13_Ctot_sw_not = 1;
  block13_n = 1;
  block13_KDfw = 10;
  block13_KDrv = 1;
  block13_kr = 1;
  block13_ratC = 0;
  block13_kdeg = 1;
  block13_Ctot_computed = 0;
  block14_A_FB_EN_sw = 0;
  block14_FF_EN_sw1 = 0;
  block14_FF_EN_sw2 = 1;
  block14_FF_EN_sw3 = 1;
  block14_FF_EN_sw4 = 0;
  block14_B_FB_EN_sw = 0;
  block14_Ctot_sw = 0;
  block14_Ctot_sw_not = 1;
  block14_n = 1;
  block14_KDfw = 10;
  block14_KDrv = 1;
  block14_kr = 1;
  block14_ratC = 0;
  block14_kdeg = 1;
  block14_Ctot_computed = 0;
  block15_A_FB_EN_sw = 0;
  block15_FF_EN_sw1 = 0;
  block15_FF_EN_sw2 = 1;
  block15_FF_EN_sw3 = 1;
  block15_FF_EN_sw4 = 0;
  block15_B_FB_EN_sw = 1;
  block15_Ctot_sw = 0;
  block15_Ctot_sw_not = 1;
  block15_n = 1;
  block15_KDfw = 100000;
  block15_KDrv = 10;
  block15_kr = 1;
  block15_ratC = 0;
  block15_kdeg = 1;
  block15_Ctot_computed = 0;
  block16_A_FB_EN_sw = 1;
  block16_FF_EN_sw1 = 0;
  block16_FF_EN_sw2 = 1;
  block16_FF_EN_sw3 = 1;
  block16_FF_EN_sw4 = 0;
  block16_B_FB_EN_sw = 0;
  block16_Ctot_sw = 0;
  block16_Ctot_sw_not = 1;
  block16_n = 1;
  block16_KDfw = 100000;
  block16_KDrv = 10;
  block16_kr = 1;
  block16_ratC = 0;
  block16_kdeg = 1;
  block16_Ctot_computed = 0;
  block17_A_FB_EN_sw = 1;
  block17_FF_EN_sw1 = 0;
  block17_FF_EN_sw2 = 1;
  block17_FF_EN_sw3 = 1;
  block17_FF_EN_sw4 = 0;
  block17_B_FB_EN_sw = 0;
  block17_Ctot_sw = 0;
  block17_Ctot_sw_not = 1;
  block17_n = 1;
  block17_KDfw = 333.3333;
  block17_KDrv = 1;
  block17_kr = 1;
  block17_ratC = 0;
  block17_kdeg = 1;
  block17_Ctot_computed = 0;
  block18_A_FB_EN_sw = 0;
  block18_FF_EN_sw1 = 0;
  block18_FF_EN_sw2 = 1;
  block18_FF_EN_sw3 = 1;
  block18_FF_EN_sw4 = 0;
  block18_B_FB_EN_sw = 0;
  block18_Ctot_sw = 0;
  block18_Ctot_sw_not = 1;
  block18_n = 1;
  block18_KDfw = 333.3333;
  block18_KDrv = 1;
  block18_kr = 1;
  block18_ratC = 0;
  block18_kdeg = 1;
  block18_Ctot_computed = 0;
  block19_A_FB_EN_sw = 1;
  block19_FF_EN_sw1 = 0;
  block19_FF_EN_sw2 = 1;
  block19_FF_EN_sw3 = 1;
  block19_FF_EN_sw4 = 0;
  block19_B_FB_EN_sw = 0;
  block19_Ctot_sw = 0;
  block19_Ctot_sw_not = 1;
  block19_n = 1;
  block19_KDfw = 10;
  block19_KDrv = 1;
  block19_kr = 1;
  block19_ratC = 0;
  block19_kdeg = 1;
  block19_Ctot_computed = 0;
  block20_A_FB_EN_sw = 0;
  block20_FF_EN_sw1 = 0;
  block20_FF_EN_sw2 = 1;
  block20_FF_EN_sw3 = 1;
  block20_FF_EN_sw4 = 0;
  block20_B_FB_EN_sw = 0;
  block20_Ctot_sw = 0;
  block20_Ctot_sw_not = 1;
  block20_n = 1;
  block20_KDfw = 10;
  block20_KDrv = 1;
  block20_kr = 1;
  block20_ratC = 0;
  block20_kdeg = 1;
  block20_Ctot_computed = 0;
  block21_A_FB_EN_sw = 1;
  block21_FF_EN_sw1 = 0;
  block21_FF_EN_sw2 = 1;
  block21_FF_EN_sw3 = 1;
  block21_FF_EN_sw4 = 0;
  block21_B_FB_EN_sw = 1;
  block21_Ctot_sw = 0;
  block21_Ctot_sw_not = 1;
  block21_n = 1;
  block21_KDfw = 100000;
  block21_KDrv = 10;
  block21_kr = 1;
  block21_ratC = 0;
  block21_kdeg = 1;
  block21_Ctot_computed = 0;
  block22_A_FB_EN_sw = 0;
  block22_FF_EN_sw1 = 0;
  block22_FF_EN_sw2 = 1;
  block22_FF_EN_sw3 = 1;
  block22_FF_EN_sw4 = 0;
  block22_B_FB_EN_sw = 0;
  block22_Ctot_sw = 0;
  block22_Ctot_sw_not = 1;
  block22_n = 1;
  block22_KDfw = 100000;
  block22_KDrv = 10;
  block22_kr = 1;
  block22_ratC = 0;
  block22_kdeg = 1;
  block22_Ctot_computed = 0;
  block23_A_FB_EN_sw = 1;
  block23_FF_EN_sw1 = 0;
  block23_FF_EN_sw2 = 1;
  block23_FF_EN_sw3 = 1;
  block23_FF_EN_sw4 = 0;
  block23_B_FB_EN_sw = 0;
  block23_Ctot_sw = 0;
  block23_Ctot_sw_not = 1;
  block23_n = 1;
  block23_KDfw = 333.3333;
  block23_KDrv = 1;
  block23_kr = 1;
  block23_ratC = 0;
  block23_kdeg = 1;
  block23_Ctot_computed = 0;
  block24_A_FB_EN_sw = 0;
  block24_FF_EN_sw1 = 0;
  block24_FF_EN_sw2 = 1;
  block24_FF_EN_sw3 = 1;
  block24_FF_EN_sw4 = 0;
  block24_B_FB_EN_sw = 0;
  block24_Ctot_sw = 0;
  block24_Ctot_sw_not = 1;
  block24_n = 1;
  block24_KDfw = 333.3333;
  block24_KDrv = 1;
  block24_kr = 1;
  block24_ratC = 0;
  block24_kdeg = 1;
  block24_Ctot_computed = 0;
  block25_A_FB_EN_sw = 1;
  block25_FF_EN_sw1 = 0;
  block25_FF_EN_sw2 = 1;
  block25_FF_EN_sw3 = 1;
  block25_FF_EN_sw4 = 0;
  block25_B_FB_EN_sw = 0;
  block25_Ctot_sw = 0;
  block25_Ctot_sw_not = 1;
  block25_n = 1;
  block25_KDfw = 10;
  block25_KDrv = 1;
  block25_kr = 1;
  block25_ratC = 0;
  block25_kdeg = 1;
  block25_Ctot_computed = 0;
  block26_A_FB_EN_sw = 0;
  block26_FF_EN_sw1 = 0;
  block26_FF_EN_sw2 = 1;
  block26_FF_EN_sw3 = 1;
  block26_FF_EN_sw4 = 0;
  block26_B_FB_EN_sw = 0;
  block26_Ctot_sw = 0;
  block26_Ctot_sw_not = 1;
  block26_n = 1;
  block26_KDfw = 10;
  block26_KDrv = 1;
  block26_kr = 1;
  block26_ratC = 0;
  block26_kdeg = 1;
  block26_Ctot_computed = 0;
  block27_A_FB_EN_sw = 0;
  block27_FF_EN_sw1 = 0;
  block27_FF_EN_sw2 = 1;
  block27_FF_EN_sw3 = 1;
  block27_FF_EN_sw4 = 0;
  block27_B_FB_EN_sw = 1;
  block27_Ctot_sw = 0;
  block27_Ctot_sw_not = 1;
  block27_n = 1;
  block27_KDfw = 100000;
  block27_KDrv = 10;
  block27_kr = 1;
  block27_ratC = 0;
  block27_kdeg = 1;
  block27_Ctot_computed = 0;
  block28_A_FB_EN_sw = 1;
  block28_FF_EN_sw1 = 0;
  block28_FF_EN_sw2 = 1;
  block28_FF_EN_sw3 = 1;
  block28_FF_EN_sw4 = 0;
  block28_B_FB_EN_sw = 0;
  block28_Ctot_sw = 0;
  block28_Ctot_sw_not = 1;
  block28_n = 1;
  block28_KDfw = 333.3333;
  block28_KDrv = 1;
  block28_kr = 1;
  block28_ratC = 0;
  block28_kdeg = 1;
  block28_Ctot_computed = 0;
  block29_A_FB_EN_sw = 0;
  block29_FF_EN_sw1 = 0;
  block29_FF_EN_sw2 = 1;
  block29_FF_EN_sw3 = 1;
  block29_FF_EN_sw4 = 0;
  block29_B_FB_EN_sw = 0;
  block29_Ctot_sw = 0;
  block29_Ctot_sw_not = 1;
  block29_n = 1;
  block29_KDfw = 333.3333;
  block29_KDrv = 1;
  block29_kr = 1;
  block29_ratC = 0;
  block29_kdeg = 1;
  block29_Ctot_computed = 0;

  // Assignment rules:
  block0_Atot := 60000 + block1_Ctot;
  block0_Btot := 70000 + block5_Ctot;
  block0_Ctot_in := 0;
  block0_Cprod := 0 + block1_rv_up;
  block0_Cdeg := 0;
  block0_Cfree := 0 + block1_Afree;
  block0_Dfree := 1;
  block0_Afree := block0_Atot - block0_A_FB_EN_sw*block0_Ctot;
  block0_Bfree := block0_Btot - block0_B_FB_EN_sw*block0_Ctot;
  block0_rate_fw := block0_Afree*(block0_Bfree/block0_KDfw)^block0_n;
  block0_fw_up := block0_Cprod - block0_FF_EN_sw1*block0_rate_fw;
  block0_fw_tot := block0_Cprod + block0_FF_EN_sw2*block0_rate_fw;
  block0_Cfree_out := block0_Cfree;
  block0_Dfree_out := block0_Dfree;
  block0_rate_rv := block0_Cfree*(block0_Dfree/block0_KDrv);
  block0_Add6 := block0_Cdeg + block0_Cfree*block0_ratC;
  block0_rv_tot := block0_FF_EN_sw3*block0_rate_rv + block0_Add6;
  block0_rv_up := block0_Add6 - block0_FF_EN_sw4*block0_rate_rv;
  block0_Add3 := block0_fw_tot - block0_FF_EN_sw3*block0_rate_rv;
  block0_Add10 := block0_Add3*block0_kr - block0_Add6*block0_kdeg;
  block0_Ctot := block0_Ctot_sw*block0_Ctot_in + block0_Ctot_computed;
  __s0 := block0_Afree;
  __s1 := block0_Bfree;
  block1_Atot := 0 + block0_Ctot;
  block1_Btot := 1;
  block1_Ctot_in := 0;
  block1_Cprod := 0;
  block1_Cdeg := 0;
  block1_Cfree := 0;
  block1_Dfree := 0;
  block1_Afree := block1_Atot - block1_A_FB_EN_sw*block1_Ctot;
  block1_Bfree := block1_Btot - block1_B_FB_EN_sw*block1_Ctot;
  block1_rate_fw := block1_Afree*(block1_Bfree/block1_KDfw)^block1_n;
  block1_fw_up := block1_Cprod - block1_FF_EN_sw1*block1_rate_fw;
  block1_fw_tot := block1_Cprod + block1_FF_EN_sw2*block1_rate_fw;
  block1_Cfree_out := block1_Cfree;
  block1_Dfree_out := block1_Dfree;
  block1_rate_rv := block1_Cfree*(block1_Dfree/block1_KDrv);
  block1_Add6 := block1_Cdeg + block1_Cfree*block1_ratC;
  block1_rv_tot := block1_FF_EN_sw3*block1_rate_rv + block1_Add6;
  block1_rv_up := block1_Add6 - block1_FF_EN_sw4*block1_rate_rv;
  block1_Add3 := block1_fw_tot - block1_FF_EN_sw3*block1_rate_rv;
  block1_Add10 := block1_Add3*block1_kr - block1_Add6*block1_kdeg;
  block1_Ctot := block1_Ctot_sw*block1_Ctot_in + block1_Ctot_computed;
  __s6 := block1_Afree;
  block2_Atot := 0;
  block2_Btot := 1;
  block2_Ctot_in := 0;
  block2_Cprod := 0 + block13_rate_fw + block1_rate_fw + block7_rate_fw;
  block2_Cdeg := 0 + block13_rate_rv + block1_rate_rv + block7_rate_rv;
  block2_Cfree := 0;
  block2_Dfree := 0;
  block2_Afree := block2_Atot - block2_A_FB_EN_sw*block2_Ctot;
  block2_Bfree := block2_Btot - block2_B_FB_EN_sw*block2_Ctot;
  block2_rate_fw := block2_Afree*(block2_Bfree/block2_KDfw)^block2_n;
  block2_fw_up := block2_Cprod - block2_FF_EN_sw1*block2_rate_fw;
  block2_fw_tot := block2_Cprod + block2_FF_EN_sw2*block2_rate_fw;
  block2_Cfree_out := block2_Cfree;
  block2_Dfree_out := block2_Dfree;
  block2_rate_rv := block2_Cfree*(block2_Dfree/block2_KDrv);
  block2_Add6 := block2_Cdeg + block2_Cfree*block2_ratC;
  block2_rv_tot := block2_FF_EN_sw3*block2_rate_rv + block2_Add6;
  block2_rv_up := block2_Add6 - block2_FF_EN_sw4*block2_rate_rv;
  block2_Add3 := block2_fw_tot - block2_FF_EN_sw3*block2_rate_rv;
  block2_Add10 := block2_Add3*block2_kr - block2_Add6*block2_kdeg;
  block2_Ctot := block2_Ctot_sw*block2_Ctot_in + block2_Ctot_computed;
  block3_Atot := 200000 + block6_Ctot + (-block9_Ctot + (-block15_Ctot));
  block3_Btot := 0 + block2_Ctot + (-block4_Ctot + (-block10_Ctot));
  block3_Ctot_in := 0;
  block3_Cprod := 0;
  block3_Cdeg := 0;
  block3_Cfree := 0 + block5_Afree;
  block3_Dfree := 1;
  block3_Afree := block3_Atot - block3_A_FB_EN_sw*block3_Ctot;
  block3_Bfree := block3_Btot - block3_B_FB_EN_sw*block3_Ctot;
  block3_rate_fw := block3_Afree*(block3_Bfree/block3_KDfw)^block3_n;
  block3_fw_up := block3_Cprod - block3_FF_EN_sw1*block3_rate_fw;
  block3_fw_tot := block3_Cprod + block3_FF_EN_sw2*block3_rate_fw;
  block3_Cfree_out := block3_Cfree;
  block3_Dfree_out := block3_Dfree;
  block3_rate_rv := block3_Cfree*(block3_Dfree/block3_KDrv);
  block3_Add6 := block3_Cdeg + block3_Cfree*block3_ratC;
  block3_rv_tot := block3_FF_EN_sw3*block3_rate_rv + block3_Add6;
  block3_rv_up := block3_Add6 - block3_FF_EN_sw4*block3_rate_rv;
  block3_Add3 := block3_fw_tot - block3_FF_EN_sw3*block3_rate_rv;
  block3_Add10 := block3_Add3*block3_kr - block3_Add6*block3_kdeg;
  block3_Ctot := block3_Ctot_sw*block3_Ctot_in + block3_Ctot_computed;
  __s4 := block3_Afree;
  __s7 := block3_Bfree;
  block4_Atot := 3000000 + block11_Ctot;
  block4_Btot := 0 + block3_Bfree;
  block4_Ctot_in := 0;
  block4_Cprod := 0;
  block4_Cdeg := 0;
  block4_Cfree := 0 + block7_Afree;
  block4_Dfree := 1;
  block4_Afree := block4_Atot - block4_A_FB_EN_sw*block4_Ctot;
  block4_Bfree := block4_Btot - block4_B_FB_EN_sw*block4_Ctot;
  block4_rate_fw := block4_Afree*(block4_Bfree/block4_KDfw)^block4_n;
  block4_fw_up := block4_Cprod - block4_FF_EN_sw1*block4_rate_fw;
  block4_fw_tot := block4_Cprod + block4_FF_EN_sw2*block4_rate_fw;
  block4_Cfree_out := block4_Cfree;
  block4_Dfree_out := block4_Dfree;
  block4_rate_rv := block4_Cfree*(block4_Dfree/block4_KDrv);
  block4_Add6 := block4_Cdeg + block4_Cfree*block4_ratC;
  block4_rv_tot := block4_FF_EN_sw3*block4_rate_rv + block4_Add6;
  block4_rv_up := block4_Add6 - block4_FF_EN_sw4*block4_rate_rv;
  block4_Add3 := block4_fw_tot - block4_FF_EN_sw3*block4_rate_rv;
  block4_Add10 := block4_Add3*block4_kr - block4_Add6*block4_kdeg;
  block4_Ctot := block4_Ctot_sw*block4_Ctot_in + block4_Ctot_computed;
  __s2 := block4_Afree;
  block5_Atot := 0 + block3_Ctot;
  block5_Btot := 1;
  block5_Ctot_in := 0;
  block5_Cprod := 0;
  block5_Cdeg := 0;
  block5_Cfree := 0;
  block5_Dfree := 0;
  block5_Afree := block5_Atot - block5_A_FB_EN_sw*block5_Ctot;
  block5_Bfree := block5_Btot - block5_B_FB_EN_sw*block5_Ctot;
  block5_rate_fw := block5_Afree*(block5_Bfree/block5_KDfw)^block5_n;
  block5_fw_up := block5_Cprod - block5_FF_EN_sw1*block5_rate_fw;
  block5_fw_tot := block5_Cprod + block5_FF_EN_sw2*block5_rate_fw;
  block5_Cfree_out := block5_Cfree;
  block5_Dfree_out := block5_Dfree;
  block5_rate_rv := block5_Cfree*(block5_Dfree/block5_KDrv);
  block5_Add6 := block5_Cdeg + block5_Cfree*block5_ratC;
  block5_rv_tot := block5_FF_EN_sw3*block5_rate_rv + block5_Add6;
  block5_rv_up := block5_Add6 - block5_FF_EN_sw4*block5_rate_rv;
  block5_Add3 := block5_fw_tot - block5_FF_EN_sw3*block5_rate_rv;
  block5_Add10 := block5_Add3*block5_kr - block5_Add6*block5_kdeg;
  block5_Ctot := block5_Ctot_sw*block5_Ctot_in + block5_Ctot_computed;
  __s8 := block5_Afree;
  block6_Atot := 0;
  block6_Btot := 1;
  block6_Ctot_in := 0;
  block6_Cprod := 0 + block17_rate_fw + block5_rate_fw + block11_rate_fw;
  block6_Cdeg := 0 + block17_rate_rv + block5_rate_rv + block11_rate_rv;
  block6_Cfree := 0;
  block6_Dfree := 0;
  block6_Afree := block6_Atot - block6_A_FB_EN_sw*block6_Ctot;
  block6_Bfree := block6_Btot - block6_B_FB_EN_sw*block6_Ctot;
  block6_rate_fw := block6_Afree*(block6_Bfree/block6_KDfw)^block6_n;
  block6_fw_up := block6_Cprod - block6_FF_EN_sw1*block6_rate_fw;
  block6_fw_tot := block6_Cprod + block6_FF_EN_sw2*block6_rate_fw;
  block6_Cfree_out := block6_Cfree;
  block6_Dfree_out := block6_Dfree;
  block6_rate_rv := block6_Cfree*(block6_Dfree/block6_KDrv);
  block6_Add6 := block6_Cdeg + block6_Cfree*block6_ratC;
  block6_rv_tot := block6_FF_EN_sw3*block6_rate_rv + block6_Add6;
  block6_rv_up := block6_Add6 - block6_FF_EN_sw4*block6_rate_rv;
  block6_Add3 := block6_fw_tot - block6_FF_EN_sw3*block6_rate_rv;
  block6_Add10 := block6_Add3*block6_kr - block6_Add6*block6_kdeg;
  block6_Ctot := block6_Ctot_sw*block6_Ctot_in + block6_Ctot_computed;
  block7_Atot := 0 + block4_Ctot;
  block7_Btot := 1;
  block7_Ctot_in := 0;
  block7_Cprod := 0;
  block7_Cdeg := 0;
  block7_Cfree := 0 + block7_Ctot;
  block7_Dfree := 0;
  block7_Afree := block7_Atot - block7_A_FB_EN_sw*block7_Ctot;
  block7_Bfree := block7_Btot - block7_B_FB_EN_sw*block7_Ctot;
  block7_rate_fw := block7_Afree*(block7_Bfree/block7_KDfw)^block7_n;
  block7_fw_up := block7_Cprod - block7_FF_EN_sw1*block7_rate_fw;
  block7_fw_tot := block7_Cprod + block7_FF_EN_sw2*block7_rate_fw;
  block7_Cfree_out := block7_Cfree;
  block7_Dfree_out := block7_Dfree;
  block7_rate_rv := block7_Cfree*(block7_Dfree/block7_KDrv);
  block7_Add6 := block7_Cdeg + block7_Cfree*block7_ratC;
  block7_rv_tot := block7_FF_EN_sw3*block7_rate_rv + block7_Add6;
  block7_rv_up := block7_Add6 - block7_FF_EN_sw4*block7_rate_rv;
  block7_Add3 := block7_fw_tot - block7_FF_EN_sw3*block7_rate_rv;
  block7_Add10 := block7_Add3*block7_kr - block7_Add6*block7_kdeg;
  block7_Ctot := block7_Ctot_sw*block7_Ctot_in + block7_Ctot_computed;
  __s9 := block7_Afree;
  block8_Atot := 0;
  block8_Btot := 1;
  block8_Ctot_in := 0;
  block8_Cprod := 0 + block17_rate_fw + block7_rate_fw;
  block8_Cdeg := 0 + block17_rate_rv + block7_rate_rv;
  block8_Cfree := 0;
  block8_Dfree := 0;
  block8_Afree := block8_Atot - block8_A_FB_EN_sw*block8_Ctot;
  block8_Bfree := block8_Btot - block8_B_FB_EN_sw*block8_Ctot;
  block8_rate_fw := block8_Afree*(block8_Bfree/block8_KDfw)^block8_n;
  block8_fw_up := block8_Cprod - block8_FF_EN_sw1*block8_rate_fw;
  block8_fw_tot := block8_Cprod + block8_FF_EN_sw2*block8_rate_fw;
  block8_Cfree_out := block8_Cfree;
  block8_Dfree_out := block8_Dfree;
  block8_rate_rv := block8_Cfree*(block8_Dfree/block8_KDrv);
  block8_Add6 := block8_Cdeg + block8_Cfree*block8_ratC;
  block8_rv_tot := block8_FF_EN_sw3*block8_rate_rv + block8_Add6;
  block8_rv_up := block8_Add6 - block8_FF_EN_sw4*block8_rate_rv;
  block8_Add3 := block8_fw_tot - block8_FF_EN_sw3*block8_rate_rv;
  block8_Add10 := block8_Add3*block8_kr - block8_Add6*block8_kdeg;
  block8_Ctot := block8_Ctot_sw*block8_Ctot_in + block8_Ctot_computed;
  block9_Atot := 0 + block3_Afree;
  block9_Btot := 0 + block8_Ctot + (-block10_Ctot);
  block9_Ctot_in := 0;
  block9_Cprod := 0;
  block9_Cdeg := 0;
  block9_Cfree := 0 + block11_Afree;
  block9_Dfree := 1;
  block9_Afree := block9_Atot - block9_A_FB_EN_sw*block9_Ctot;
  block9_Bfree := block9_Btot - block9_B_FB_EN_sw*block9_Ctot;
  block9_rate_fw := block9_Afree*(block9_Bfree/block9_KDfw)^block9_n;
  block9_fw_up := block9_Cprod - block9_FF_EN_sw1*block9_rate_fw;
  block9_fw_tot := block9_Cprod + block9_FF_EN_sw2*block9_rate_fw;
  block9_Cfree_out := block9_Cfree;
  block9_Dfree_out := block9_Dfree;
  block9_rate_rv := block9_Cfree*(block9_Dfree/block9_KDrv);
  block9_Add6 := block9_Cdeg + block9_Cfree*block9_ratC;
  block9_rv_tot := block9_FF_EN_sw3*block9_rate_rv + block9_Add6;
  block9_rv_up := block9_Add6 - block9_FF_EN_sw4*block9_rate_rv;
  block9_Add3 := block9_fw_tot - block9_FF_EN_sw3*block9_rate_rv;
  block9_Add10 := block9_Add3*block9_kr - block9_Add6*block9_kdeg;
  block9_Ctot := block9_Ctot_sw*block9_Ctot_in + block9_Ctot_computed;
  __s10 := block9_Bfree;
  block10_Atot := 0 + block3_Bfree;
  block10_Btot := 0 + block9_Bfree;
  block10_Ctot_in := 0;
  block10_Cprod := 0;
  block10_Cdeg := 0;
  block10_Cfree := 0 + block13_Afree;
  block10_Dfree := 1;
  block10_Afree := block10_Atot - block10_A_FB_EN_sw*block10_Ctot;
  block10_Bfree := block10_Btot - block10_B_FB_EN_sw*block10_Ctot;
  block10_rate_fw := block10_Afree*(block10_Bfree/block10_KDfw)^block10_n;
  block10_fw_up := block10_Cprod - block10_FF_EN_sw1*block10_rate_fw;
  block10_fw_tot := block10_Cprod + block10_FF_EN_sw2*block10_rate_fw;
  block10_Cfree_out := block10_Cfree;
  block10_Dfree_out := block10_Dfree;
  block10_rate_rv := block10_Cfree*(block10_Dfree/block10_KDrv);
  block10_Add6 := block10_Cdeg + block10_Cfree*block10_ratC;
  block10_rv_tot := block10_FF_EN_sw3*block10_rate_rv + block10_Add6;
  block10_rv_up := block10_Add6 - block10_FF_EN_sw4*block10_rate_rv;
  block10_Add3 := block10_fw_tot - block10_FF_EN_sw3*block10_rate_rv;
  block10_Add10 := block10_Add3*block10_kr - block10_Add6*block10_kdeg;
  block10_Ctot := block10_Ctot_sw*block10_Ctot_in + block10_Ctot_computed;
  block11_Atot := 0 + block9_Ctot;
  block11_Btot := 1;
  block11_Ctot_in := 0;
  block11_Cprod := 0;
  block11_Cdeg := 0;
  block11_Cfree := 0;
  block11_Dfree := 0;
  block11_Afree := block11_Atot - block11_A_FB_EN_sw*block11_Ctot;
  block11_Bfree := block11_Btot - block11_B_FB_EN_sw*block11_Ctot;
  block11_rate_fw := block11_Afree*(block11_Bfree/block11_KDfw)^block11_n;
  block11_fw_up := block11_Cprod - block11_FF_EN_sw1*block11_rate_fw;
  block11_fw_tot := block11_Cprod + block11_FF_EN_sw2*block11_rate_fw;
  block11_Cfree_out := block11_Cfree;
  block11_Dfree_out := block11_Dfree;
  block11_rate_rv := block11_Cfree*(block11_Dfree/block11_KDrv);
  block11_Add6 := block11_Cdeg + block11_Cfree*block11_ratC;
  block11_rv_tot := block11_FF_EN_sw3*block11_rate_rv + block11_Add6;
  block11_rv_up := block11_Add6 - block11_FF_EN_sw4*block11_rate_rv;
  block11_Add3 := block11_fw_tot - block11_FF_EN_sw3*block11_rate_rv;
  block11_Add10 := block11_Add3*block11_kr - block11_Add6*block11_kdeg;
  block11_Ctot := block11_Ctot_sw*block11_Ctot_in + block11_Ctot_computed;
  __s11 := block11_Afree;
  block12_Atot := 0;
  block12_Btot := 1;
  block12_Ctot_in := 0;
  block12_Cprod := 0 + block11_rate_fw;
  block12_Cdeg := 0 + block11_rate_rv;
  block12_Cfree := 0 + block12_Ctot;
  block12_Dfree := 0;
  block12_Afree := block12_Atot - block12_A_FB_EN_sw*block12_Ctot;
  block12_Bfree := block12_Btot - block12_B_FB_EN_sw*block12_Ctot;
  block12_rate_fw := block12_Afree*(block12_Bfree/block12_KDfw)^block12_n;
  block12_fw_up := block12_Cprod - block12_FF_EN_sw1*block12_rate_fw;
  block12_fw_tot := block12_Cprod + block12_FF_EN_sw2*block12_rate_fw;
  block12_Cfree_out := block12_Cfree;
  block12_Dfree_out := block12_Dfree;
  block12_rate_rv := block12_Cfree*(block12_Dfree/block12_KDrv);
  block12_Add6 := block12_Cdeg + block12_Cfree*block12_ratC;
  block12_rv_tot := block12_FF_EN_sw3*block12_rate_rv + block12_Add6;
  block12_rv_up := block12_Add6 - block12_FF_EN_sw4*block12_rate_rv;
  block12_Add3 := block12_fw_tot - block12_FF_EN_sw3*block12_rate_rv;
  block12_Add10 := block12_Add3*block12_kr - block12_Add6*block12_kdeg;
  block12_Ctot := block12_Ctot_sw*block12_Ctot_in + block12_Ctot_computed;
  block13_Atot := 0 + block10_Ctot;
  block13_Btot := 1;
  block13_Ctot_in := 0;
  block13_Cprod := 0;
  block13_Cdeg := 0;
  block13_Cfree := 0 + block13_Ctot;
  block13_Dfree := 0;
  block13_Afree := block13_Atot - block13_A_FB_EN_sw*block13_Ctot;
  block13_Bfree := block13_Btot - block13_B_FB_EN_sw*block13_Ctot;
  block13_rate_fw := block13_Afree*(block13_Bfree/block13_KDfw)^block13_n;
  block13_fw_up := block13_Cprod - block13_FF_EN_sw1*block13_rate_fw;
  block13_fw_tot := block13_Cprod + block13_FF_EN_sw2*block13_rate_fw;
  block13_Cfree_out := block13_Cfree;
  block13_Dfree_out := block13_Dfree;
  block13_rate_rv := block13_Cfree*(block13_Dfree/block13_KDrv);
  block13_Add6 := block13_Cdeg + block13_Cfree*block13_ratC;
  block13_rv_tot := block13_FF_EN_sw3*block13_rate_rv + block13_Add6;
  block13_rv_up := block13_Add6 - block13_FF_EN_sw4*block13_rate_rv;
  block13_Add3 := block13_fw_tot - block13_FF_EN_sw3*block13_rate_rv;
  block13_Add10 := block13_Add3*block13_kr - block13_Add6*block13_kdeg;
  block13_Ctot := block13_Ctot_sw*block13_Ctot_in + block13_Ctot_computed;
  __s12 := block13_Afree;
  block14_Atot := 0;
  block14_Btot := 1;
  block14_Ctot_in := 0;
  block14_Cprod := 0 + block25_rate_fw + block13_rate_fw + block19_rate_fw;
  block14_Cdeg := 0 + block25_rate_rv + block13_rate_rv + block19_rate_rv;
  block14_Cfree := 0;
  block14_Dfree := 0;
  block14_Afree := block14_Atot - block14_A_FB_EN_sw*block14_Ctot;
  block14_Bfree := block14_Btot - block14_B_FB_EN_sw*block14_Ctot;
  block14_rate_fw := block14_Afree*(block14_Bfree/block14_KDfw)^block14_n;
  block14_fw_up := block14_Cprod - block14_FF_EN_sw1*block14_rate_fw;
  block14_fw_tot := block14_Cprod + block14_FF_EN_sw2*block14_rate_fw;
  block14_Cfree_out := block14_Cfree;
  block14_Dfree_out := block14_Dfree;
  block14_rate_rv := block14_Cfree*(block14_Dfree/block14_KDrv);
  block14_Add6 := block14_Cdeg + block14_Cfree*block14_ratC;
  block14_rv_tot := block14_FF_EN_sw3*block14_rate_rv + block14_Add6;
  block14_rv_up := block14_Add6 - block14_FF_EN_sw4*block14_rate_rv;
  block14_Add3 := block14_fw_tot - block14_FF_EN_sw3*block14_rate_rv;
  block14_Add10 := block14_Add3*block14_kr - block14_Add6*block14_kdeg;
  block14_Ctot := block14_Ctot_sw*block14_Ctot_in + block14_Ctot_computed;
  block15_Atot := 0 + block3_Afree;
  block15_Btot := 0 + block14_Ctot + (-block16_Ctot + (-block22_Ctot));
  block15_Ctot_in := 0;
  block15_Cprod := 0;
  block15_Cdeg := 0;
  block15_Cfree := 0 + block17_Afree;
  block15_Dfree := 1;
  block15_Afree := block15_Atot - block15_A_FB_EN_sw*block15_Ctot;
  block15_Bfree := block15_Btot - block15_B_FB_EN_sw*block15_Ctot;
  block15_rate_fw := block15_Afree*(block15_Bfree/block15_KDfw)^block15_n;
  block15_fw_up := block15_Cprod - block15_FF_EN_sw1*block15_rate_fw;
  block15_fw_tot := block15_Cprod + block15_FF_EN_sw2*block15_rate_fw;
  block15_Cfree_out := block15_Cfree;
  block15_Dfree_out := block15_Dfree;
  block15_rate_rv := block15_Cfree*(block15_Dfree/block15_KDrv);
  block15_Add6 := block15_Cdeg + block15_Cfree*block15_ratC;
  block15_rv_tot := block15_FF_EN_sw3*block15_rate_rv + block15_Add6;
  block15_rv_up := block15_Add6 - block15_FF_EN_sw4*block15_rate_rv;
  block15_Add3 := block15_fw_tot - block15_FF_EN_sw3*block15_rate_rv;
  block15_Add10 := block15_Add3*block15_kr - block15_Add6*block15_kdeg;
  block15_Ctot := block15_Ctot_sw*block15_Ctot_in + block15_Ctot_computed;
  __s13 := block15_Bfree;
  block16_Atot := 700000 + block23_Ctot;
  block16_Btot := 0 + block15_Bfree;
  block16_Ctot_in := 0;
  block16_Cprod := 0;
  block16_Cdeg := 0;
  block16_Cfree := 0 + block19_Afree;
  block16_Dfree := 1;
  block16_Afree := block16_Atot - block16_A_FB_EN_sw*block16_Ctot;
  block16_Bfree := block16_Btot - block16_B_FB_EN_sw*block16_Ctot;
  block16_rate_fw := block16_Afree*(block16_Bfree/block16_KDfw)^block16_n;
  block16_fw_up := block16_Cprod - block16_FF_EN_sw1*block16_rate_fw;
  block16_fw_tot := block16_Cprod + block16_FF_EN_sw2*block16_rate_fw;
  block16_Cfree_out := block16_Cfree;
  block16_Dfree_out := block16_Dfree;
  block16_rate_rv := block16_Cfree*(block16_Dfree/block16_KDrv);
  block16_Add6 := block16_Cdeg + block16_Cfree*block16_ratC;
  block16_rv_tot := block16_FF_EN_sw3*block16_rate_rv + block16_Add6;
  block16_rv_up := block16_Add6 - block16_FF_EN_sw4*block16_rate_rv;
  block16_Add3 := block16_fw_tot - block16_FF_EN_sw3*block16_rate_rv;
  block16_Add10 := block16_Add3*block16_kr - block16_Add6*block16_kdeg;
  block16_Ctot := block16_Ctot_sw*block16_Ctot_in + block16_Ctot_computed;
  __s3 := block16_Afree;
  block17_Atot := 0 + block15_Ctot;
  block17_Btot := 1;
  block17_Ctot_in := 0;
  block17_Cprod := 0;
  block17_Cdeg := 0;
  block17_Cfree := 0 + block17_Ctot;
  block17_Dfree := 0;
  block17_Afree := block17_Atot - block17_A_FB_EN_sw*block17_Ctot;
  block17_Bfree := block17_Btot - block17_B_FB_EN_sw*block17_Ctot;
  block17_rate_fw := block17_Afree*(block17_Bfree/block17_KDfw)^block17_n;
  block17_fw_up := block17_Cprod - block17_FF_EN_sw1*block17_rate_fw;
  block17_fw_tot := block17_Cprod + block17_FF_EN_sw2*block17_rate_fw;
  block17_Cfree_out := block17_Cfree;
  block17_Dfree_out := block17_Dfree;
  block17_rate_rv := block17_Cfree*(block17_Dfree/block17_KDrv);
  block17_Add6 := block17_Cdeg + block17_Cfree*block17_ratC;
  block17_rv_tot := block17_FF_EN_sw3*block17_rate_rv + block17_Add6;
  block17_rv_up := block17_Add6 - block17_FF_EN_sw4*block17_rate_rv;
  block17_Add3 := block17_fw_tot - block17_FF_EN_sw3*block17_rate_rv;
  block17_Add10 := block17_Add3*block17_kr - block17_Add6*block17_kdeg;
  block17_Ctot := block17_Ctot_sw*block17_Ctot_in + block17_Ctot_computed;
  __s14 := block17_Afree;
  block18_Atot := 0;
  block18_Btot := 1;
  block18_Ctot_in := 0;
  block18_Cprod := 0 + block17_rate_fw;
  block18_Cdeg := 0 + block17_rate_rv;
  block18_Cfree := 0 + block18_Ctot;
  block18_Dfree := 0;
  block18_Afree := block18_Atot - block18_A_FB_EN_sw*block18_Ctot;
  block18_Bfree := block18_Btot - block18_B_FB_EN_sw*block18_Ctot;
  block18_rate_fw := block18_Afree*(block18_Bfree/block18_KDfw)^block18_n;
  block18_fw_up := block18_Cprod - block18_FF_EN_sw1*block18_rate_fw;
  block18_fw_tot := block18_Cprod + block18_FF_EN_sw2*block18_rate_fw;
  block18_Cfree_out := block18_Cfree;
  block18_Dfree_out := block18_Dfree;
  block18_rate_rv := block18_Cfree*(block18_Dfree/block18_KDrv);
  block18_Add6 := block18_Cdeg + block18_Cfree*block18_ratC;
  block18_rv_tot := block18_FF_EN_sw3*block18_rate_rv + block18_Add6;
  block18_rv_up := block18_Add6 - block18_FF_EN_sw4*block18_rate_rv;
  block18_Add3 := block18_fw_tot - block18_FF_EN_sw3*block18_rate_rv;
  block18_Add10 := block18_Add3*block18_kr - block18_Add6*block18_kdeg;
  block18_Ctot := block18_Ctot_sw*block18_Ctot_in + block18_Ctot_computed;
  block19_Atot := 0 + block16_Ctot;
  block19_Btot := 1;
  block19_Ctot_in := 0;
  block19_Cprod := 0;
  block19_Cdeg := 0;
  block19_Cfree := 0 + block19_Ctot;
  block19_Dfree := 0;
  block19_Afree := block19_Atot - block19_A_FB_EN_sw*block19_Ctot;
  block19_Bfree := block19_Btot - block19_B_FB_EN_sw*block19_Ctot;
  block19_rate_fw := block19_Afree*(block19_Bfree/block19_KDfw)^block19_n;
  block19_fw_up := block19_Cprod - block19_FF_EN_sw1*block19_rate_fw;
  block19_fw_tot := block19_Cprod + block19_FF_EN_sw2*block19_rate_fw;
  block19_Cfree_out := block19_Cfree;
  block19_Dfree_out := block19_Dfree;
  block19_rate_rv := block19_Cfree*(block19_Dfree/block19_KDrv);
  block19_Add6 := block19_Cdeg + block19_Cfree*block19_ratC;
  block19_rv_tot := block19_FF_EN_sw3*block19_rate_rv + block19_Add6;
  block19_rv_up := block19_Add6 - block19_FF_EN_sw4*block19_rate_rv;
  block19_Add3 := block19_fw_tot - block19_FF_EN_sw3*block19_rate_rv;
  block19_Add10 := block19_Add3*block19_kr - block19_Add6*block19_kdeg;
  block19_Ctot := block19_Ctot_sw*block19_Ctot_in + block19_Ctot_computed;
  __s15 := block19_Afree;
  block20_Atot := 0;
  block20_Btot := 1;
  block20_Ctot_in := 0;
  block20_Cprod := 0 + block28_rate_fw + block19_rate_fw;
  block20_Cdeg := 0 + block28_rate_rv + block19_rate_rv;
  block20_Cfree := 0;
  block20_Dfree := 0;
  block20_Afree := block20_Atot - block20_A_FB_EN_sw*block20_Ctot;
  block20_Bfree := block20_Btot - block20_B_FB_EN_sw*block20_Ctot;
  block20_rate_fw := block20_Afree*(block20_Bfree/block20_KDfw)^block20_n;
  block20_fw_up := block20_Cprod - block20_FF_EN_sw1*block20_rate_fw;
  block20_fw_tot := block20_Cprod + block20_FF_EN_sw2*block20_rate_fw;
  block20_Cfree_out := block20_Cfree;
  block20_Dfree_out := block20_Dfree;
  block20_rate_rv := block20_Cfree*(block20_Dfree/block20_KDrv);
  block20_Add6 := block20_Cdeg + block20_Cfree*block20_ratC;
  block20_rv_tot := block20_FF_EN_sw3*block20_rate_rv + block20_Add6;
  block20_rv_up := block20_Add6 - block20_FF_EN_sw4*block20_rate_rv;
  block20_Add3 := block20_fw_tot - block20_FF_EN_sw3*block20_rate_rv;
  block20_Add10 := block20_Add3*block20_kr - block20_Add6*block20_kdeg;
  block20_Ctot := block20_Ctot_sw*block20_Ctot_in + block20_Ctot_computed;
  block21_Atot := 17000 + block24_Ctot + (-block27_Ctot);
  block21_Btot := 0 + block20_Ctot + (-block22_Ctot);
  block21_Ctot_in := 0;
  block21_Cprod := 0;
  block21_Cdeg := 0;
  block21_Cfree := 0 + block23_Afree;
  block21_Dfree := 1;
  block21_Afree := block21_Atot - block21_A_FB_EN_sw*block21_Ctot;
  block21_Bfree := block21_Btot - block21_B_FB_EN_sw*block21_Ctot;
  block21_rate_fw := block21_Afree*(block21_Bfree/block21_KDfw)^block21_n;
  block21_fw_up := block21_Cprod - block21_FF_EN_sw1*block21_rate_fw;
  block21_fw_tot := block21_Cprod + block21_FF_EN_sw2*block21_rate_fw;
  block21_Cfree_out := block21_Cfree;
  block21_Dfree_out := block21_Dfree;
  block21_rate_rv := block21_Cfree*(block21_Dfree/block21_KDrv);
  block21_Add6 := block21_Cdeg + block21_Cfree*block21_ratC;
  block21_rv_tot := block21_FF_EN_sw3*block21_rate_rv + block21_Add6;
  block21_rv_up := block21_Add6 - block21_FF_EN_sw4*block21_rate_rv;
  block21_Add3 := block21_fw_tot - block21_FF_EN_sw3*block21_rate_rv;
  block21_Add10 := block21_Add3*block21_kr - block21_Add6*block21_kdeg;
  block21_Ctot := block21_Ctot_sw*block21_Ctot_in + block21_Ctot_computed;
  __s5 := block21_Afree;
  __s16 := block21_Bfree;
  block22_Atot := 0 + block15_Bfree;
  block22_Btot := 0 + block21_Bfree;
  block22_Ctot_in := 0;
  block22_Cprod := 0;
  block22_Cdeg := 0;
  block22_Cfree := 0 + block25_Afree;
  block22_Dfree := 1;
  block22_Afree := block22_Atot - block22_A_FB_EN_sw*block22_Ctot;
  block22_Bfree := block22_Btot - block22_B_FB_EN_sw*block22_Ctot;
  block22_rate_fw := block22_Afree*(block22_Bfree/block22_KDfw)^block22_n;
  block22_fw_up := block22_Cprod - block22_FF_EN_sw1*block22_rate_fw;
  block22_fw_tot := block22_Cprod + block22_FF_EN_sw2*block22_rate_fw;
  block22_Cfree_out := block22_Cfree;
  block22_Dfree_out := block22_Dfree;
  block22_rate_rv := block22_Cfree*(block22_Dfree/block22_KDrv);
  block22_Add6 := block22_Cdeg + block22_Cfree*block22_ratC;
  block22_rv_tot := block22_FF_EN_sw3*block22_rate_rv + block22_Add6;
  block22_rv_up := block22_Add6 - block22_FF_EN_sw4*block22_rate_rv;
  block22_Add3 := block22_fw_tot - block22_FF_EN_sw3*block22_rate_rv;
  block22_Add10 := block22_Add3*block22_kr - block22_Add6*block22_kdeg;
  block22_Ctot := block22_Ctot_sw*block22_Ctot_in + block22_Ctot_computed;
  block23_Atot := 0 + block21_Ctot;
  block23_Btot := 1;
  block23_Ctot_in := 0;
  block23_Cprod := 0;
  block23_Cdeg := 0;
  block23_Cfree := 0;
  block23_Dfree := 0;
  block23_Afree := block23_Atot - block23_A_FB_EN_sw*block23_Ctot;
  block23_Bfree := block23_Btot - block23_B_FB_EN_sw*block23_Ctot;
  block23_rate_fw := block23_Afree*(block23_Bfree/block23_KDfw)^block23_n;
  block23_fw_up := block23_Cprod - block23_FF_EN_sw1*block23_rate_fw;
  block23_fw_tot := block23_Cprod + block23_FF_EN_sw2*block23_rate_fw;
  block23_Cfree_out := block23_Cfree;
  block23_Dfree_out := block23_Dfree;
  block23_rate_rv := block23_Cfree*(block23_Dfree/block23_KDrv);
  block23_Add6 := block23_Cdeg + block23_Cfree*block23_ratC;
  block23_rv_tot := block23_FF_EN_sw3*block23_rate_rv + block23_Add6;
  block23_rv_up := block23_Add6 - block23_FF_EN_sw4*block23_rate_rv;
  block23_Add3 := block23_fw_tot - block23_FF_EN_sw3*block23_rate_rv;
  block23_Add10 := block23_Add3*block23_kr - block23_Add6*block23_kdeg;
  block23_Ctot := block23_Ctot_sw*block23_Ctot_in + block23_Ctot_computed;
  __s17 := block23_Afree;
  block24_Atot := 0;
  block24_Btot := 1;
  block24_Ctot_in := 0;
  block24_Cprod := 0 + block28_rate_fw + block23_rate_fw;
  block24_Cdeg := 0 + block28_rate_rv + block23_rate_rv;
  block24_Cfree := 0;
  block24_Dfree := 0;
  block24_Afree := block24_Atot - block24_A_FB_EN_sw*block24_Ctot;
  block24_Bfree := block24_Btot - block24_B_FB_EN_sw*block24_Ctot;
  block24_rate_fw := block24_Afree*(block24_Bfree/block24_KDfw)^block24_n;
  block24_fw_up := block24_Cprod - block24_FF_EN_sw1*block24_rate_fw;
  block24_fw_tot := block24_Cprod + block24_FF_EN_sw2*block24_rate_fw;
  block24_Cfree_out := block24_Cfree;
  block24_Dfree_out := block24_Dfree;
  block24_rate_rv := block24_Cfree*(block24_Dfree/block24_KDrv);
  block24_Add6 := block24_Cdeg + block24_Cfree*block24_ratC;
  block24_rv_tot := block24_FF_EN_sw3*block24_rate_rv + block24_Add6;
  block24_rv_up := block24_Add6 - block24_FF_EN_sw4*block24_rate_rv;
  block24_Add3 := block24_fw_tot - block24_FF_EN_sw3*block24_rate_rv;
  block24_Add10 := block24_Add3*block24_kr - block24_Add6*block24_kdeg;
  block24_Ctot := block24_Ctot_sw*block24_Ctot_in + block24_Ctot_computed;
  block25_Atot := 0 + block22_Ctot;
  block25_Btot := 1;
  block25_Ctot_in := 0;
  block25_Cprod := 0;
  block25_Cdeg := 0;
  block25_Cfree := 0 + block25_Ctot;
  block25_Dfree := 0;
  block25_Afree := block25_Atot - block25_A_FB_EN_sw*block25_Ctot;
  block25_Bfree := block25_Btot - block25_B_FB_EN_sw*block25_Ctot;
  block25_rate_fw := block25_Afree*(block25_Bfree/block25_KDfw)^block25_n;
  block25_fw_up := block25_Cprod - block25_FF_EN_sw1*block25_rate_fw;
  block25_fw_tot := block25_Cprod + block25_FF_EN_sw2*block25_rate_fw;
  block25_Cfree_out := block25_Cfree;
  block25_Dfree_out := block25_Dfree;
  block25_rate_rv := block25_Cfree*(block25_Dfree/block25_KDrv);
  block25_Add6 := block25_Cdeg + block25_Cfree*block25_ratC;
  block25_rv_tot := block25_FF_EN_sw3*block25_rate_rv + block25_Add6;
  block25_rv_up := block25_Add6 - block25_FF_EN_sw4*block25_rate_rv;
  block25_Add3 := block25_fw_tot - block25_FF_EN_sw3*block25_rate_rv;
  block25_Add10 := block25_Add3*block25_kr - block25_Add6*block25_kdeg;
  block25_Ctot := block25_Ctot_sw*block25_Ctot_in + block25_Ctot_computed;
  __s18 := block25_Afree;
  block26_Atot := 0;
  block26_Btot := 1;
  block26_Ctot_in := 0;
  block26_Cprod := 0 + block25_rate_fw;
  block26_Cdeg := 0 + block25_rate_rv;
  block26_Cfree := 0;
  block26_Dfree := 0;
  block26_Afree := block26_Atot - block26_A_FB_EN_sw*block26_Ctot;
  block26_Bfree := block26_Btot - block26_B_FB_EN_sw*block26_Ctot;
  block26_rate_fw := block26_Afree*(block26_Bfree/block26_KDfw)^block26_n;
  block26_fw_up := block26_Cprod - block26_FF_EN_sw1*block26_rate_fw;
  block26_fw_tot := block26_Cprod + block26_FF_EN_sw2*block26_rate_fw;
  block26_Cfree_out := block26_Cfree;
  block26_Dfree_out := block26_Dfree;
  block26_rate_rv := block26_Cfree*(block26_Dfree/block26_KDrv);
  block26_Add6 := block26_Cdeg + block26_Cfree*block26_ratC;
  block26_rv_tot := block26_FF_EN_sw3*block26_rate_rv + block26_Add6;
  block26_rv_up := block26_Add6 - block26_FF_EN_sw4*block26_rate_rv;
  block26_Add3 := block26_fw_tot - block26_FF_EN_sw3*block26_rate_rv;
  block26_Add10 := block26_Add3*block26_kr - block26_Add6*block26_kdeg;
  block26_Ctot := block26_Ctot_sw*block26_Ctot_in + block26_Ctot_computed;
  block27_Atot := 0 + block21_Afree;
  block27_Btot := 0 + block26_Ctot;
  block27_Ctot_in := 0;
  block27_Cprod := 0;
  block27_Cdeg := 0;
  block27_Cfree := 0 + block28_Afree;
  block27_Dfree := 1;
  block27_Afree := block27_Atot - block27_A_FB_EN_sw*block27_Ctot;
  block27_Bfree := block27_Btot - block27_B_FB_EN_sw*block27_Ctot;
  block27_rate_fw := block27_Afree*(block27_Bfree/block27_KDfw)^block27_n;
  block27_fw_up := block27_Cprod - block27_FF_EN_sw1*block27_rate_fw;
  block27_fw_tot := block27_Cprod + block27_FF_EN_sw2*block27_rate_fw;
  block27_Cfree_out := block27_Cfree;
  block27_Dfree_out := block27_Dfree;
  block27_rate_rv := block27_Cfree*(block27_Dfree/block27_KDrv);
  block27_Add6 := block27_Cdeg + block27_Cfree*block27_ratC;
  block27_rv_tot := block27_FF_EN_sw3*block27_rate_rv + block27_Add6;
  block27_rv_up := block27_Add6 - block27_FF_EN_sw4*block27_rate_rv;
  block27_Add3 := block27_fw_tot - block27_FF_EN_sw3*block27_rate_rv;
  block27_Add10 := block27_Add3*block27_kr - block27_Add6*block27_kdeg;
  block27_Ctot := block27_Ctot_sw*block27_Ctot_in + block27_Ctot_computed;
  __s19 := block27_Bfree;
  block28_Atot := 0 + block27_Ctot;
  block28_Btot := 1;
  block28_Ctot_in := 0;
  block28_Cprod := 0;
  block28_Cdeg := 0;
  block28_Cfree := 0 + block28_Ctot;
  block28_Dfree := 0;
  block28_Afree := block28_Atot - block28_A_FB_EN_sw*block28_Ctot;
  block28_Bfree := block28_Btot - block28_B_FB_EN_sw*block28_Ctot;
  block28_rate_fw := block28_Afree*(block28_Bfree/block28_KDfw)^block28_n;
  block28_fw_up := block28_Cprod - block28_FF_EN_sw1*block28_rate_fw;
  block28_fw_tot := block28_Cprod + block28_FF_EN_sw2*block28_rate_fw;
  block28_Cfree_out := block28_Cfree;
  block28_Dfree_out := block28_Dfree;
  block28_rate_rv := block28_Cfree*(block28_Dfree/block28_KDrv);
  block28_Add6 := block28_Cdeg + block28_Cfree*block28_ratC;
  block28_rv_tot := block28_FF_EN_sw3*block28_rate_rv + block28_Add6;
  block28_rv_up := block28_Add6 - block28_FF_EN_sw4*block28_rate_rv;
  block28_Add3 := block28_fw_tot - block28_FF_EN_sw3*block28_rate_rv;
  block28_Add10 := block28_Add3*block28_kr - block28_Add6*block28_kdeg;
  block28_Ctot := block28_Ctot_sw*block28_Ctot_in + block28_Ctot_computed;
  __s20 := block28_Afree;
  block29_Atot := 0;
  block29_Btot := 1;
  block29_Ctot_in := 0;
  block29_Cprod := 0 + block28_rate_fw;
  block29_Cdeg := 0 + block28_rate_rv;
  block29_Cfree := 0 + block29_Ctot;
  block29_Dfree := 0;
  block29_Afree := block29_Atot - block29_A_FB_EN_sw*block29_Ctot;
  block29_Bfree := block29_Btot - block29_B_FB_EN_sw*block29_Ctot;
  block29_rate_fw := block29_Afree*(block29_Bfree/block29_KDfw)^block29_n;
  block29_fw_up := block29_Cprod - block29_FF_EN_sw1*block29_rate_fw;
  block29_fw_tot := block29_Cprod + block29_FF_EN_sw2*block29_rate_fw;
  block29_Cfree_out := block29_Cfree;
  block29_Dfree_out := block29_Dfree;
  block29_rate_rv := block29_Cfree*(block29_Dfree/block29_KDrv);
  block29_Add6 := block29_Cdeg + block29_Cfree*block29_ratC;
  block29_rv_tot := block29_FF_EN_sw3*block29_rate_rv + block29_Add6;
  block29_rv_up := block29_Add6 - block29_FF_EN_sw4*block29_rate_rv;
  block29_Add3 := block29_fw_tot - block29_FF_EN_sw3*block29_rate_rv;
  block29_Add10 := block29_Add3*block29_kr - block29_Add6*block29_kdeg;
  block29_Ctot := block29_Ctot_sw*block29_Ctot_in + block29_Ctot_computed;

  // Rate rules:
  block0_Ctot_computed' = block0_Ctot_sw_not*block0_Add10;
  block1_Ctot_computed' = block1_Ctot_sw_not*block1_Add10;
  block2_Ctot_computed' = block2_Ctot_sw_not*block2_Add10;
  block3_Ctot_computed' = block3_Ctot_sw_not*block3_Add10;
  block4_Ctot_computed' = block4_Ctot_sw_not*block4_Add10;
  block5_Ctot_computed' = block5_Ctot_sw_not*block5_Add10;
  block6_Ctot_computed' = block6_Ctot_sw_not*block6_Add10;
  block7_Ctot_computed' = block7_Ctot_sw_not*block7_Add10;
  block8_Ctot_computed' = block8_Ctot_sw_not*block8_Add10;
  block9_Ctot_computed' = block9_Ctot_sw_not*block9_Add10;
  block10_Ctot_computed' = block10_Ctot_sw_not*block10_Add10;
  block11_Ctot_computed' = block11_Ctot_sw_not*block11_Add10;
  block12_Ctot_computed' = block12_Ctot_sw_not*block12_Add10;
  block13_Ctot_computed' = block13_Ctot_sw_not*block13_Add10;
  block14_Ctot_computed' = block14_Ctot_sw_not*block14_Add10;
  block15_Ctot_computed' = block15_Ctot_sw_not*block15_Add10;
  block16_Ctot_computed' = block16_Ctot_sw_not*block16_Add10;
  block17_Ctot_computed' = block17_Ctot_sw_not*block17_Add10;
  block18_Ctot_computed' = block18_Ctot_sw_not*block18_Add10;
  block19_Ctot_computed' = block19_Ctot_sw_not*block19_Add10;
  block20_Ctot_computed' = block20_Ctot_sw_not*block20_Add10;
  block21_Ctot_computed' = block21_Ctot_sw_not*block21_Add10;
  block22_Ctot_computed' = block22_Ctot_sw_not*block22_Add10;
  block23_Ctot_computed' = block23_Ctot_sw_not*block23_Add10;
  block24_Ctot_computed' = block24_Ctot_sw_not*block24_Add10;
  block25_Ctot_computed' = block25_Ctot_sw_not*block25_Add10;
  block26_Ctot_computed' = block26_Ctot_sw_not*block26_Add10;
  block27_Ctot_computed' = block27_Ctot_sw_not*block27_Add10;
  block28_Ctot_computed' = block28_Ctot_sw_not*block28_Add10;
  block29_Ctot_computed' = block29_Ctot_sw_not*block29_Add10;
end
