// SBML level 3 version 1

model repressor_combined()

  // Compartments:
  compartment default_compartment = 1;

  // Species:
  species PX in default_compartment = 0;
  species PY in default_compartment = 0;
  species PZ in default_compartment = 0;
  species X in default_compartment = 0;
  species Y in default_compartment = 100;
  species Z in default_compartment = 0;

  // Parameters:
  a0_tr = 0;
  a_tr = 100;
  Km = kr^0.5/kf;
  n = 2;
  k_tl = 20;
  kr = 1000;
  kf = 7.905694;
  kdeg_rna = 10;
  kdeg_protein = 10;

  // Reactions:
  txX: => X; a0_tr + a_tr*Km^n/(PZ^n + Km^n);  // modifiers: PZ
  trX: => PX; k_tl*X;  // modifiers: X
  txY: => Y; a0_tr + a_tr*Km^n/(PX^n + Km^n);  // modifiers: PX
  trY: => PY; k_tl*Y;  // modifiers: Y
  txZ: => Z; a0_tr + a_tr*Km^n/(PY^n + Km^n);  // modifiers: PY
  trZ: => PZ; k_tl*Z;  // modifiers: Z
  dX: X => ; kdeg_rna*X;
  dPX: PX => ; kdeg_protein*PX;
  dY: Z => ; kdeg_rna*Z;
  dPY: PZ => ; kdeg_protein*PZ;
end
