// SBML level 3 version 1

model main()

  // Compartments:
  compartment comp1 = 1;

  // Species:
  species P_0 in comp1;
  species PZ in comp1;
  species B_0 in comp1;
  species X in comp1;
  species P_1 in comp1;
  species PX in comp1;
  species B_1 in comp1;
  species Y in comp1;
  species P_2 in comp1;
  species PY in comp1;
  species B_2 in comp1;
  species Z in comp1;

  // Parameters:
  block0_A_FB_EN_sw = 1;
  block0_FF_EN_sw1 = 0;
  block0_FF_EN_sw2 = 1;
  block0_FF_EN_sw3 = 1;
  block0_FF_EN_sw4 = 0;
  block0_B_FB_EN_sw = 0;
  block0_Ctot_sw = 0;
  block0_Ctot_sw_not = 1;
  block0_n = 2;
  block0_KDfw = 4;
  block0_KDrv = 10;
  block0_kr = 1000;
  block0_ratC = 0;
  block0_kdeg = 1;
  block0_Ctot_computed = 0;
  block1_A_FB_EN_sw = 0;
  block1_FF_EN_sw1 = 0;
  block1_FF_EN_sw2 = 1;
  block1_FF_EN_sw3 = 1;
  block1_FF_EN_sw4 = 0;
  block1_B_FB_EN_sw = 0;
  block1_Ctot_sw = 0;
  block1_Ctot_sw_not = 1;
  block1_n = 1;
  block1_KDfw = 10;
  block1_KDrv = 10;
  block1_kr = 100;
  block1_ratC = 0;
  block1_kdeg = 1;
  block1_Ctot_computed = 0;
  block2_A_FB_EN_sw = 0;
  block2_FF_EN_sw1 = 0;
  block2_FF_EN_sw2 = 1;
  block2_FF_EN_sw3 = 1;
  block2_FF_EN_sw4 = 0;
  block2_B_FB_EN_sw = 0;
  block2_Ctot_sw = 0;
  block2_Ctot_sw_not = 1;
  block2_n = 1;
  block2_KDfw = 10;
  block2_KDrv = 10;
  block2_kr = 20;
  block2_ratC = 0;
  block2_kdeg = 1;
  block2_Ctot_computed = 0;
  block3_A_FB_EN_sw = 1;
  block3_FF_EN_sw1 = 0;
  block3_FF_EN_sw2 = 1;
  block3_FF_EN_sw3 = 1;
  block3_FF_EN_sw4 = 0;
  block3_B_FB_EN_sw = 0;
  block3_Ctot_sw = 0;
  block3_Ctot_sw_not = 1;
  block3_n = 2;
  block3_KDfw = 4;
  block3_KDrv = 10;
  block3_kr = 1000;
  block3_ratC = 0;
  block3_kdeg = 1;
  block3_Ctot_computed = 0;
  block4_A_FB_EN_sw = 0;
  block4_FF_EN_sw1 = 0;
  block4_FF_EN_sw2 = 1;
  block4_FF_EN_sw3 = 1;
  block4_FF_EN_sw4 = 0;
  block4_B_FB_EN_sw = 0;
  block4_Ctot_sw = 0;
  block4_Ctot_sw_not = 1;
  block4_n = 1;
  block4_KDfw = 10;
  block4_KDrv = 10;
  block4_kr = 100;
  block4_ratC = 0;
  block4_kdeg = 1;
  block4_Ctot_computed = 0;
  block5_A_FB_EN_sw = 0;
  block5_FF_EN_sw1 = 0;
  block5_FF_EN_sw2 = 1;
  block5_FF_EN_sw3 = 1;
  block5_FF_EN_sw4 = 0;
  block5_B_FB_EN_sw = 0;
  block5_Ctot_sw = 0;
  block5_Ctot_sw_not = 1;
  block5_n = 1;
  block5_KDfw = 10;
  block5_KDrv = 10;
  block5_kr = 20;
  block5_ratC = 0;
  block5_kdeg = 1;
  block5_Ctot_computed = 0;
  block6_A_FB_EN_sw = 1;
  block6_FF_EN_sw1 = 0;
  block6_FF_EN_sw2 = 1;
  block6_FF_EN_sw3 = 1;
  block6_FF_EN_sw4 = 0;
  block6_B_FB_EN_sw = 0;
  block6_Ctot_sw = 0;
  block6_Ctot_sw_not = 1;
  block6_n = 2;
  block6_KDfw = 4;
  block6_KDrv = 10;
  block6_kr = 1000;
  block6_ratC = 0;
  block6_kdeg = 1;
  block6_Ctot_computed = 0;
  block7_A_FB_EN_sw = 0;
  block7_FF_EN_sw1 = 0;
  block7_FF_EN_sw2 = 1;
  block7_FF_EN_sw3 = 1;
  block7_FF_EN_sw4 = 0;
  block7_B_FB_EN_sw = 0;
  block7_Ctot_sw = 0;
  block7_Ctot_sw_not = 1;
  block7_n = 1;
  block7_KDfw = 10;
  block7_KDrv = 10;
  block7_kr = 100;
  block7_ratC = 0;
  block7_kdeg = 1;
  block7_Ctot_computed = 0;
  block8_A_FB_EN_sw = 0;
  block8_FF_EN_sw1 = 0;
  block8_FF_EN_sw2 = 1;
  block8_FF_EN_sw3 = 1;
  block8_FF_EN_sw4 = 0;
  block8_B_FB_EN_sw = 0;
  block8_Ctot_sw = 0;
  block8_Ctot_sw_not = 1;
  block8_n = 1;
  block8_KDfw = 10;
  block8_KDrv = 10;
  block8_kr = 20;
  block8_ratC = 0;
  block8_kdeg = 1;
  block8_Ctot_computed = 0;

  // Assignment rules:
  block0_Atot := 865;
  block0_Btot := 0 + block8_Ctot;
  block0_Ctot_in := 0;
  block0_Cprod := 0;
  block0_Cdeg := 0;
  block0_Cfree := 0 + block0_Ctot;
  block0_Dfree := 10;
  block0_Afree := block0_Atot - block0_A_FB_EN_sw*block0_Ctot;
  block0_Bfree := block0_Btot - block0_B_FB_EN_sw*block0_Ctot;
  block0_rate_fw := block0_Afree*(block0_Bfree/block0_KDfw)^block0_n;
  block0_fw_up := block0_Cprod - block0_FF_EN_sw1*block0_rate_fw;
  block0_fw_tot := block0_Cprod + block0_FF_EN_sw2*block0_rate_fw;
  block0_Cfree_out := block0_Cfree;
  block0_Dfree_out := block0_Dfree;
  block0_rate_rv := block0_Cfree*(block0_Dfree/block0_KDrv);
  block0_Add6 := block0_Cdeg + block0_Cfree*block0_ratC;
  block0_rv_tot := block0_FF_EN_sw3*block0_rate_rv + block0_Add6;
  block0_rv_up := block0_Add6 - block0_FF_EN_sw4*block0_rate_rv;
  block0_Add3 := block0_fw_tot - block0_FF_EN_sw3*block0_rate_rv;
  block0_Add10 := block0_Add3*block0_kr - block0_Add6*block0_kdeg;
  block0_Ctot := block0_Ctot_sw*block0_Ctot_in + block0_Ctot_computed;
  P_0 := block0_Afree;
  PZ := block0_Bfree;
  B_0 := block0_Ctot;
  block1_Atot := 0.865 + block0_Afree;
  block1_Btot := 10;
  block1_Ctot_in := 0;
  block1_Cprod := 0;
  block1_Cdeg := 0;
  block1_Cfree := 0 + block1_Ctot;
  block1_Dfree := 10;
  block1_Afree := block1_Atot - block1_A_FB_EN_sw*block1_Ctot;
  block1_Bfree := block1_Btot - block1_B_FB_EN_sw*block1_Ctot;
  block1_rate_fw := block1_Afree*(block1_Bfree/block1_KDfw)^block1_n;
  block1_fw_up := block1_Cprod - block1_FF_EN_sw1*block1_rate_fw;
  block1_fw_tot := block1_Cprod + block1_FF_EN_sw2*block1_rate_fw;
  block1_Cfree_out := block1_Cfree;
  block1_Dfree_out := block1_Dfree;
  block1_rate_rv := block1_Cfree*(block1_Dfree/block1_KDrv);
  block1_Add6 := block1_Cdeg + block1_Cfree*block1_ratC;
  block1_rv_tot := block1_FF_EN_sw3*block1_rate_rv + block1_Add6;
  block1_rv_up := block1_Add6 - block1_FF_EN_sw4*block1_rate_rv;
  block1_Add3 := block1_fw_tot - block1_FF_EN_sw3*block1_rate_rv;
  block1_Add10 := block1_Add3*block1_kr - block1_Add6*block1_kdeg;
  block1_Ctot := block1_Ctot_sw*block1_Ctot_in + block1_Ctot_computed;
  block2_Atot := 0 + block1_Ctot;
  block2_Btot := 10;
  block2_Ctot_in := 0;
  block2_Cprod := 0;
  block2_Cdeg := 0;
  block2_Cfree := 0 + block2_Ctot;
  block2_Dfree := 10;
  block2_Afree := block2_Atot - block2_A_FB_EN_sw*block2_Ctot;
  block2_Bfree := block2_Btot - block2_B_FB_EN_sw*block2_Ctot;
  block2_rate_fw := block2_Afree*(block2_Bfree/block2_KDfw)^block2_n;
  block2_fw_up := block2_Cprod - block2_FF_EN_sw1*block2_rate_fw;
  block2_fw_tot := block2_Cprod + block2_FF_EN_sw2*block2_rate_fw;
  block2_Cfree_out := block2_Cfree;
  block2_Dfree_out := block2_Dfree;
  block2_rate_rv := block2_Cfree*(block2_Dfree/block2_KDrv);
  block2_Add6 := block2_Cdeg + block2_Cfree*block2_ratC;
  block2_rv_tot := block2_FF_EN_sw3*block2_rate_rv + block2_Add6;
  block2_rv_up := block2_Add6 - block2_FF_EN_sw4*block2_rate_rv;
  block2_Add3 := block2_fw_tot - block2_FF_EN_sw3*block2_rate_rv;
  block2_Add10 := block2_Add3*block2_kr - block2_Add6*block2_kdeg;
  block2_Ctot := block2_Ctot_sw*block2_Ctot_in + block2_Ctot_computed;
  X := block2_Afree;
  block3_Atot := 865;
  block3_Btot := 0 + block2_Ctot;
  block3_Ctot_in := 0;
  block3_Cprod := 0;
  block3_Cdeg := 0;
  block3_Cfree := 0 + block3_Ctot;
  block3_Dfree := 10;
  block3_Afree := block3_Atot - block3_A_FB_EN_sw*block3_Ctot;
  block3_Bfree := block3_Btot - block3_B_FB_EN_sw*block3_Ctot;
  block3_rate_fw := block3_Afree*(block3_Bfree/block3_KDfw)^block3_n;
  block3_fw_up := block3_Cprod - block3_FF_EN_sw1*block3_rate_fw;
  block3_fw_tot := block3_Cprod + block3_FF_EN_sw2*block3_rate_fw;
  block3_Cfree_out := block3_Cfree;
  block3_Dfree_out := block3_Dfree;
  block3_rate_rv := block3_Cfree*(block3_Dfree/block3_KDrv);
  block3_Add6 := block3_Cdeg + block3_Cfree*block3_ratC;
  block3_rv_tot := block3_FF_EN_sw3*block3_rate_rv + block3_Add6;
  block3_rv_up := block3_Add6 - block3_FF_EN_sw4*block3_rate_rv;
  block3_Add3 := block3_fw_tot - block3_FF_EN_sw3*block3_rate_rv;
  block3_Add10 := block3_Add3*block3_kr - block3_Add6*block3_kdeg;
  block3_Ctot := block3_Ctot_sw*block3_Ctot_in + block3_Ctot_computed;
  P_1 := block3_Afree;
  PX := block3_Bfree;
  B_1 := block3_Ctot;
  block4_Atot := 0.865 + block3_Afree;
  block4_Btot := 10;
  block4_Ctot_in := 0;
  block4_Cprod := 0;
  block4_Cdeg := 0;
  block4_Cfree := 0 + block4_Ctot;
  block4_Dfree := 10;
  block4_Afree := block4_Atot - block4_A_FB_EN_sw*block4_Ctot;
  block4_Bfree := block4_Btot - block4_B_FB_EN_sw*block4_Ctot;
  block4_rate_fw := block4_Afree*(block4_Bfree/block4_KDfw)^block4_n;
  block4_fw_up := block4_Cprod - block4_FF_EN_sw1*block4_rate_fw;
  block4_fw_tot := block4_Cprod + block4_FF_EN_sw2*block4_rate_fw;
  block4_Cfree_out := block4_Cfree;
  block4_Dfree_out := block4_Dfree;
  block4_rate_rv := block4_Cfree*(block4_Dfree/block4_KDrv);
  block4_Add6 := block4_Cdeg + block4_Cfree*block4_ratC;
  block4_rv_tot := block4_FF_EN_sw3*block4_rate_rv + block4_Add6;
  block4_rv_up := block4_Add6 - block4_FF_EN_sw4*block4_rate_rv;
  block4_Add3 := block4_fw_tot - block4_FF_EN_sw3*block4_rate_rv;
  block4_Add10 := block4_Add3*block4_kr - block4_Add6*block4_kdeg;
  block4_Ctot := block4_Ctot_sw*block4_Ctot_in + block4_Ctot_computed;
  block5_Atot := 0.5 + block4_Ctot;
  block5_Btot := 10;
  block5_Ctot_in := 0;
  block5_Cprod := 0;
  block5_Cdeg := 0;
  block5_Cfree := 0 + block5_Ctot;
  block5_Dfree := 10;
  block5_Afree := block5_Atot - block5_A_FB_EN_sw*block5_Ctot;
  block5_Bfree := block5_Btot - block5_B_FB_EN_sw*block5_Ctot;
  block5_rate_fw := block5_Afree*(block5_Bfree/block5_KDfw)^block5_n;
  block5_fw_up := block5_Cprod - block5_FF_EN_sw1*block5_rate_fw;
  block5_fw_tot := block5_Cprod + block5_FF_EN_sw2*block5_rate_fw;
  block5_Cfree_out := block5_Cfree;
  block5_Dfree_out := block5_Dfree;
  block5_rate_rv := block5_Cfree*(block5_Dfree/block5_KDrv);
  block5_Add6 := block5_Cdeg + block5_Cfree*block5_ratC;
  block5_rv_tot := block5_FF_EN_sw3*block5_rate_rv + block5_Add6;
  block5_rv_up := block5_Add6 - block5_FF_EN_sw4*block5_rate_rv;
  block5_Add3 := block5_fw_tot - block5_FF_EN_sw3*block5_rate_rv;
  block5_Add10 := block5_Add3*block5_kr - block5_Add6*block5_kdeg;
  block5_Ctot := block5_Ctot_sw*block5_Ctot_in + block5_Ctot_computed;
  Y := block5_Afree;
  block6_Atot := 865;
  block6_Btot := 0 + block5_Ctot;
  block6_Ctot_in := 0;
  block6_Cprod := 0;
  block6_Cdeg := 0;
  block6_Cfree := 0 + block6_Ctot;
  block6_Dfree := 10;
  block6_Afree := block6_Atot - block6_A_FB_EN_sw*block6_Ctot;
  block6_Bfree := block6_Btot - block6_B_FB_EN_sw*block6_Ctot;
  block6_rate_fw := block6_Afree*(block6_Bfree/block6_KDfw)^block6_n;
  block6_fw_up := block6_Cprod - block6_FF_EN_sw1*block6_rate_fw;
  block6_fw_tot := block6_Cprod + block6_FF_EN_sw2*block6_rate_fw;
  block6_Cfree_out := block6_Cfree;
  block6_Dfree_out := block6_Dfree;
  block6_rate_rv := block6_Cfree*(block6_Dfree/block6_KDrv);
  block6_Add6 := block6_Cdeg + block6_Cfree*block6_ratC;
  block6_rv_tot := block6_FF_EN_sw3*block6_rate_rv + block6_Add6;
  block6_rv_up := block6_Add6 - block6_FF_EN_sw4*block6_rate_rv;
  block6_Add3 := block6_fw_tot - block6_FF_EN_sw3*block6_rate_rv;
  block6_Add10 := block6_Add3*block6_kr - block6_Add6*block6_kdeg;
  block6_Ctot := block6_Ctot_sw*block6_Ctot_in + block6_Ctot_computed;
  P_2 := block6_Afree;
  PY := block6_Bfree;
  B_2 := block6_Ctot;
  block7_Atot := 0.865 + block6_Afree;
  block7_Btot := 10;
  block7_Ctot_in := 0;
  block7_Cprod := 0;
  block7_Cdeg := 0;
  block7_Cfree := 0 + block7_Ctot;
  block7_Dfree := 10;
  block7_Afree := block7_Atot - block7_A_FB_EN_sw*block7_Ctot;
  block7_Bfree := block7_Btot - block7_B_FB_EN_sw*block7_Ctot;
  block7_rate_fw := block7_Afree*(block7_Bfree/block7_KDfw)^block7_n;
  block7_fw_up := block7_Cprod - block7_FF_EN_sw1*block7_rate_fw;
  block7_fw_tot := block7_Cprod + block7_FF_EN_sw2*block7_rate_fw;
  block7_Cfree_out := block7_Cfree;
  block7_Dfree_out := block7_Dfree;
  block7_rate_rv := block7_Cfree*(block7_Dfree/block7_KDrv);
  block7_Add6 := block7_Cdeg + block7_Cfree*block7_ratC;
  block7_rv_tot := block7_FF_EN_sw3*block7_rate_rv + block7_Add6;
  block7_rv_up := block7_Add6 - block7_FF_EN_sw4*block7_rate_rv;
  block7_Add3 := block7_fw_tot - block7_FF_EN_sw3*block7_rate_rv;
  block7_Add10 := block7_Add3*block7_kr - block7_Add6*block7_kdeg;
  block7_Ctot := block7_Ctot_sw*block7_Ctot_in + block7_Ctot_computed;
  block8_Atot := 0 + block7_Ctot;
  block8_Btot := 10;
  block8_Ctot_in := 0;
  block8_Cprod := 0;
  block8_Cdeg := 0;
  block8_Cfree := 0 + block8_Ctot;
  block8_Dfree := 10;
  block8_Afree := block8_Atot - block8_A_FB_EN_sw*block8_Ctot;
  block8_Bfree := block8_Btot - block8_B_FB_EN_sw*block8_Ctot;
  block8_rate_fw := block8_Afree*(block8_Bfree/block8_KDfw)^block8_n;
  block8_fw_up := block8_Cprod - block8_FF_EN_sw1*block8_rate_fw;
  block8_fw_tot := block8_Cprod + block8_FF_EN_sw2*block8_rate_fw;
  block8_Cfree_out := block8_Cfree;
  block8_Dfree_out := block8_Dfree;
  block8_rate_rv := block8_Cfree*(block8_Dfree/block8_KDrv);
  block8_Add6 := block8_Cdeg + block8_Cfree*block8_ratC;
  block8_rv_tot := block8_FF_EN_sw3*block8_rate_rv + block8_Add6;
  block8_rv_up := block8_Add6 - block8_FF_EN_sw4*block8_rate_rv;
  block8_Add3 := block8_fw_tot - block8_FF_EN_sw3*block8_rate_rv;
  block8_Add10 := block8_Add3*block8_kr - block8_Add6*block8_kdeg;
  block8_Ctot := block8_Ctot_sw*block8_Ctot_in + block8_Ctot_computed;
  Z := block8_Afree;

  // Rate rules:
  block0_Ctot_computed' = block0_Ctot_sw_not*block0_Add10;
  block1_Ctot_computed' = block1_Ctot_sw_not*block1_Add10;
  block2_Ctot_computed' = block2_Ctot_sw_not*block2_Add10;
  block3_Ctot_computed' = block3_Ctot_sw_not*block3_Add10;
  block4_Ctot_computed' = block4_Ctot_sw_not*block4_Add10;
  block5_Ctot_computed' = block5_Ctot_sw_not*block5_Add10;
  block6_Ctot_computed' = block6_Ctot_sw_not*block6_Add10;
  block7_Ctot_computed' = block7_Ctot_sw_not*block7_Add10;
  block8_Ctot_computed' = block8_Ctot_sw_not*block8_Add10;
end
