// SBML level 3 version 1

model repressor_combined()

  // Compartments:
  compartment default_compartment = 1;

  // Species:
  species PX in default_compartment = 0;
  species PY in default_compartment = 0;
  species PZ in default_compartment = 0;
  species X in default_compartment = 0;
  species Y in default_compartment = 0.5;
  species Z in default_compartment = 0;

  // Parameters:
  a0_tr = 0.865;
  a_tr = 100*865;
  Km = kr^0.5/kf;
  n = 2;
  kdeg_rna = 100;
  k_tl = 20;
  kdeg_protein = 20;
  kr = 1000;
  kf = 7.905694;

  // Reactions:
  txX: => X; a0_tr + a_tr*Km^n/(PZ^n + Km^n) - kdeg_rna*X;  // modifiers: PZ
  trX: -> PX; k_tl*X - kdeg_protein*PX;  // modifiers: X
  txY: => Y; a0_tr + a_tr*Km^n/(PX^n + Km^n) - kdeg_rna*Y;  // modifiers: PX
  trY: -> PY; k_tl*Y - kdeg_protein*PY;  // modifiers: Y
  txZ: => Z; a0_tr + a_tr*Km^n/(PY^n + Km^n) - kdeg_rna*Z;  // modifiers: PY
  trZ: -> PZ; k_tl*Z - kdeg_protein*PZ;  // modifiers: Z
end
